# OpenSim document version 30000
ScaleTool Fullbody_LS_Scaled:
  mass: 71.2 [kg]
  height: -1
  age: -1
  ModelScaler:
    apply: true
    scaling_order: measurements
    marker_file: Static1.trc
    time_range: 3 3.5
    preserve_mass_distribution: true
    MeasurementSet:
      Measurement head: apply=true
        MarkerPair: markers=(LFHD LBHD)
        MarkerPair: markers=(RFHD RBHD)
        BodyScale head: axes=(X Y Z)
      Measurement torso_height: apply=true
        MarkerPair: markers=(RHJC CLAV)
        MarkerPair: markers=(LHJC CLAV)
        BodyScale torso: axes=Y
      Measurement torso_breadth: apply=true
        MarkerPair: markers=(T8 CLAV)
        BodyScale torso: axes=X
      Measurement torso_width: apply=true
        MarkerPair: markers=(RSJC LSJC)
        BodyScale torso: axes=Z
      Measurement humerus: apply=true
        MarkerPair: markers=(RSJC REJC)
        MarkerPair: markers=(LSJC LEJC)
        BodyScale humerus_r: axes=Y
        BodyScale humerus_l: axes=Y
      Measurement radius_ulna: apply=true
        MarkerPair: markers=(REJC RWJC)
        MarkerPair: markers=(LEJC LWJC)
        BodyScale ulna_r: axes=Y
        BodyScale radius_r: axes=Y
        BodyScale ulna_l: axes=Y
        BodyScale radius_l: axes=Y
      Measurement hand: apply=true
        MarkerPair: markers=(RWJC RCAR)
        MarkerPair: markers=(LWJC LCAR)
        BodyScale hand_r: axes=Y
        BodyScale hand_l: axes=Y
      Measurement pelvis_w: apply=true
        MarkerPair: markers=(RASI LASI)
        BodyScale pelvis: axes=Z
      Measurement pelvis_d: apply=true
        MarkerPair: markers=(RPSI RASI)
        MarkerPair: markers=(LPSI LASI)
        BodyScale pelvis: axes=X
      Measurement pelvis_h: apply=true
        MarkerPair: markers=(RHJC RASI)
        MarkerPair: markers=(LHJC LASI)
        BodyScale pelvis: axes=Y
      Measurement r_thigh: apply=true
        MarkerPair: markers=(RHJC RLFC)
        BodyScale femur_r: axes=(X Y Z)
      Measurement r_tibia: apply=true
        MarkerPair: markers=(RLFC RLMAL)
        BodyScale tibia_r: axes=(X Y Z)
        BodyScale talus_r: axes=(Y Z)
      Measurement r_foot: apply=true
        MarkerPair: markers=(RCAL RMT23)
        BodyScale talus_r: axes=X
        BodyScale calcn_r: axes=X
      Measurement l_thigh: apply=true
        MarkerPair: markers=(LHJC LLFC)
        BodyScale femur_l: axes=(X Y Z)
      Measurement l_tibia: apply=true
        MarkerPair: markers=(LLFC LLMAL)
        BodyScale tibia_l: axes=(X Y Z)
        BodyScale talus_l: axes=(Y Z)
      Measurement l_foot: apply=true
        MarkerPair: markers=(LCAL LMT23)
        BodyScale talus_l: axes=X
        BodyScale calcn_l: axes=X
  MarkerPlacer:
    apply: true
    marker_file: static1.trc
    time_range: 2.5 3
    output_model_file: LSMain_Scaled
    max_marker_movement: -1
    IKTaskSet:
      IKMarkerTask LFHD: apply=true weight=20
      IKMarkerTask RFHD: apply=true weight=20
      IKMarkerTask LBHD: apply=true weight=40
      IKMarkerTask RBHD: apply=true weight=40
      IKMarkerTask THO1: apply=false weight=5
      IKMarkerTask THO2: apply=false weight=5
      IKMarkerTask THO3: apply=false weight=5
      IKMarkerTask CLAV: apply=true weight=30
      IKMarkerTask T8: apply=true weight=30
      IKMarkerTask LACR4: apply=false weight=20
      IKMarkerTask LSJC: apply=false weight=5
      IKMarkerTask LLEP: apply=true weight=10
      IKMarkerTask LEJC: apply=true weight=30
      IKMarkerTask LWRU: apply=true weight=10
      IKMarkerTask LWJC: apply=true weight=10
      IKMarkerTask LHNDR: apply=false weight=5
      IKMarkerTask LHNDU: apply=false weight=5
      IKMarkerTask LCAR: apply=true weight=5
      IKMarkerTask RACR4: apply=false weight=20
      IKMarkerTask RSJC: apply=false weight=5
      IKMarkerTask RLEP: apply=true weight=10
      IKMarkerTask REJC: apply=true weight=30
      IKMarkerTask RWRU: apply=true weight=10
      IKMarkerTask RWJC: apply=true weight=10
      IKMarkerTask RHNDR: apply=false weight=5
      IKMarkerTask RHNDU: apply=false weight=5
      IKMarkerTask RCAR: apply=true weight=5
      IKMarkerTask LASI: apply=true weight=100
      IKMarkerTask RASI: apply=true weight=100
      IKMarkerTask LPSI: apply=true weight=100
      IKMarkerTask RPSI: apply=true weight=100
      IKMarkerTask LHJC: apply=true weight=50
      IKMarkerTask RHJC: apply=true weight=50
      IKMarkerTask LTH1: apply=false weight=1
      IKMarkerTask LTH2: apply=false weight=1
      IKMarkerTask LTH3: apply=false weight=1
      IKMarkerTask LKJC: apply=false weight=50
      IKMarkerTask LMFC: apply=true weight=20
      IKMarkerTask LLFC: apply=true weight=30
      IKMarkerTask LTB1: apply=false weight=1
      IKMarkerTask LTB2: apply=false weight=1
      IKMarkerTask LTB3: apply=false weight=1
      IKMarkerTask LAJC: apply=false weight=50
      IKMarkerTask LMMAL: apply=true weight=30
      IKMarkerTask LLMAL: apply=true weight=30
      IKMarkerTask LCAL: apply=true weight=20
      IKMarkerTask LMT1: apply=true weight=5
      IKMarkerTask LMT23: apply=true weight=5
      IKMarkerTask LMT5: apply=true weight=10
      IKMarkerTask RTH1: apply=false weight=1
      IKMarkerTask RTH2: apply=false weight=1
      IKMarkerTask RTH3: apply=false weight=1
      IKMarkerTask RKJC: apply=false weight=50
      IKMarkerTask RMFC: apply=true weight=20
      IKMarkerTask RLFC: apply=true weight=30
      IKMarkerTask RTB1: apply=false weight=1
      IKMarkerTask RTB2: apply=false weight=1
      IKMarkerTask RTB3: apply=false weight=1
      IKMarkerTask RAJC: apply=false weight=50
      IKMarkerTask RMMAL: apply=true weight=30
      IKMarkerTask RLMAL: apply=true weight=30
      IKMarkerTask RCAL: apply=true weight=20
      IKMarkerTask RMT1: apply=true weight=5
      IKMarkerTask RMT23: apply=true weight=5
      IKMarkerTask RMT5: apply=true weight=10
      IKCoordinateTask ankle_angle_r: apply=false weight=1000 value_type=default_value value=0
      IKCoordinateTask ankle_angle_l: apply=false weight=1000 value_type=default_value value=0
      IKCoordinateTask neck_extension: apply=true weight=500 value_type=default_value value=0
