# OpenSim document version 30000
ScaleTool Fullbody_LS_Scaled:
  mass: 70 [kg]
  height: -1
  age: -1
  ModelScaler:
    apply: true
    scaling_order: manualScale
    time_range: 0 0.1
    preserve_mass_distribution: true
    ScaleSet:
      Scale: scales=(1 1 1) segment=ground apply=true
      Scale: scales=(1 1 1) segment=pelvis apply=true
      Scale: scales=(1 1 1) segment=femur_r apply=true
      Scale: scales=(1 1 1) segment=origin_tibia_r apply=true
      Scale: scales=(1 1 1) segment=medialTibia_r apply=true
      Scale: scales=(1 1 1) segment=lateralTibia_r apply=true
      Scale: scales=(1 1 1) segment=talus_r apply=true
      Scale: scales=(1 1 1) segment=calcn_r apply=true
      Scale: scales=(1 1 1) segment=toes_r apply=true
      Scale: scales=(1 1 1) segment=femur_l apply=true
      Scale: scales=(1 1 1) segment=origin_tibia_l apply=true
      Scale: scales=(1 1 1) segment=medialTibia_l apply=true
      Scale: scales=(1 1 1) segment=lateralTibia_l apply=true
      Scale: scales=(1 1 1) segment=talus_l apply=true
      Scale: scales=(1 1 1) segment=calcn_l apply=true
      Scale: scales=(1 1 1) segment=toes_l apply=true
      Scale: scales=(1 1 1) segment=torso apply=true
      Scale: scales=(1 1 1) segment=humerus_r apply=true
      Scale: scales=(1 1 1) segment=ulna_r apply=true
      Scale: scales=(1 1 1) segment=radius_r apply=true
      Scale: scales=(1 1 1) segment=hand_r apply=true
      Scale: scales=(1 1 1) segment=humerus_l apply=true
      Scale: scales=(1 1 1) segment=ulna_l apply=true
      Scale: scales=(1 1 1) segment=radius_l apply=true
      Scale: scales=(1 1 1) segment=hand_l apply=true
  MarkerPlacer:
    apply: true
    marker_file: static1.trc
    time_range: 1 1.5
    output_model_file: LSMain_Scaled
    max_marker_movement: -1
    IKTaskSet:
      IKMarkerTask LFHD: apply=true weight=1
      IKMarkerTask RFHD: apply=true weight=1
      IKMarkerTask LBHD: apply=true weight=1
      IKMarkerTask RBHD: apply=true weight=1
      IKMarkerTask THO1: apply=false weight=5
      IKMarkerTask THO2: apply=false weight=5
      IKMarkerTask THO3: apply=false weight=5
      IKMarkerTask CLAV: apply=10 weight=30
      IKMarkerTask T8: apply=true weight=10
      IKMarkerTask LACR4: apply=false weight=20
      IKMarkerTask LSJC: apply=false weight=5
      IKMarkerTask LLEP: apply=true weight=1
      IKMarkerTask LEJC: apply=true weight=1
      IKMarkerTask LWRU: apply=true weight=1
      IKMarkerTask LWJC: apply=true weight=1
      IKMarkerTask LHNDR: apply=false weight=5
      IKMarkerTask LHNDU: apply=false weight=5
      IKMarkerTask LCAR: apply=true weight=1
      IKMarkerTask RACR4: apply=false weight=20
      IKMarkerTask RSJC: apply=false weight=5
      IKMarkerTask RLEP: apply=true weight=1
      IKMarkerTask REJC: apply=true weight=1
      IKMarkerTask RWRU: apply=true weight=1
      IKMarkerTask RWJC: apply=true weight=1
      IKMarkerTask RHNDR: apply=false weight=5
      IKMarkerTask RHNDU: apply=false weight=5
      IKMarkerTask RCAR: apply=true weight=1
      IKMarkerTask LASI: apply=true weight=10
      IKMarkerTask RASI: apply=true weight=10
      IKMarkerTask LPSI: apply=true weight=10
      IKMarkerTask RPSI: apply=true weight=10
      IKMarkerTask LHJC: apply=true weight=10
      IKMarkerTask RHJC: apply=true weight=10
      IKMarkerTask LTH1: apply=false weight=1
      IKMarkerTask LTH2: apply=false weight=1
      IKMarkerTask LTH3: apply=false weight=1
      IKMarkerTask LKJC: apply=false weight=50
      IKMarkerTask LMFC: apply=true weight=10
      IKMarkerTask LLFC: apply=true weight=10
      IKMarkerTask LTB1: apply=false weight=1
      IKMarkerTask LTB2: apply=false weight=1
      IKMarkerTask LTB3: apply=false weight=1
      IKMarkerTask LAJC: apply=false weight=50
      IKMarkerTask LMMAL: apply=true weight=10
      IKMarkerTask LLMAL: apply=true weight=10
      IKMarkerTask LCAL: apply=true weight=10
      IKMarkerTask LMT1: apply=true weight=5
      IKMarkerTask LMT23: apply=true weight=5
      IKMarkerTask LMT5: apply=true weight=10
      IKMarkerTask RTH1: apply=false weight=1
      IKMarkerTask RTH2: apply=false weight=1
      IKMarkerTask RTH3: apply=false weight=1
      IKMarkerTask RKJC: apply=false weight=10
      IKMarkerTask RMFC: apply=true weight=10
      IKMarkerTask RLFC: apply=true weight=10
      IKMarkerTask RTB1: apply=false weight=1
      IKMarkerTask RTB2: apply=false weight=1
      IKMarkerTask RTB3: apply=false weight=1
      IKMarkerTask RAJC: apply=false weight=50
      IKMarkerTask RMMAL: apply=true weight=10
      IKMarkerTask RLMAL: apply=true weight=10
      IKMarkerTask RCAL: apply=true weight=10
      IKMarkerTask RMT1: apply=true weight=5
      IKMarkerTask RMT23: apply=true weight=5
      IKMarkerTask RMT5: apply=true weight=10
      IKCoordinateTask ankle_angle_r: apply=false weight=1000 value_type=default_value value=0
      IKCoordinateTask ankle_angle_l: apply=false weight=1000 value_type=default_value value=0
      IKCoordinateTask neck_extension: apply=true weight=500 value_type=default_value value=0
