# OpenSim document version 30000
ScaleTool LS_FullBodyModel:
  mass: 73.15 [kg]
  height: 1.71
  age: -1
  ModelScaler:
    apply: true
    scaling_order: manualScale
    marker_file: Static1_Processed.trc
    time_range: 0.35 0.45
    preserve_mass_distribution: true
    output_model_file: scaled2unity
    output_scale_file: scaled2unitySFs
    ScaleSet:
      Scale: scales=(1 1 1) segment=ground apply=true
      Scale: scales=(1 1 1) segment=pelvis apply=true
      Scale: scales=(1 1 1) segment=femur_r apply=true
      Scale: scales=(1 1 1) segment=origin_tibia_r apply=true
      Scale: scales=(1 1 1) segment=medialTibia_r apply=true
      Scale: scales=(1 1 1) segment=lateralTibia_r apply=true
      Scale: scales=(1 1 1) segment=patella_r apply=true
      Scale: scales=(1 1 1) segment=talus_r apply=true
      Scale: scales=(1 1 1) segment=calcn_r apply=true
      Scale: scales=(1 1 1) segment=toes_r apply=true
      Scale: scales=(1 1 1) segment=femur_l apply=true
      Scale: scales=(1 1 1) segment=origin_tibia_l apply=true
      Scale: scales=(1 1 1) segment=medialTibia_l apply=true
      Scale: scales=(1 1 1) segment=lateralTibia_l apply=true
      Scale: scales=(1 1 1) segment=patella_l apply=true
      Scale: scales=(1 1 1) segment=talus_l apply=true
      Scale: scales=(1 1 1) segment=calcn_l apply=true
      Scale: scales=(1 1 1) segment=toes_l apply=true
      Scale: scales=(1 1 1) segment=torso apply=true
      Scale: scales=(1 1 1) segment=humerus_r apply=true
      Scale: scales=(1 1 1) segment=ulna_r apply=true
      Scale: scales=(1 1 1) segment=radius_r apply=true
      Scale: scales=(1 1 1) segment=hand_r apply=true
      Scale: scales=(1 1 1) segment=humerus_l apply=true
      Scale: scales=(1 1 1) segment=ulna_l apply=true
      Scale: scales=(1 1 1) segment=radius_l apply=true
      Scale: scales=(1 1 1) segment=hand_l apply=true
  MarkerPlacer:
    apply: true
    marker_file: Static1_Processed.trc
    time_range: 0.5 0.7
    output_motion_file: Subject 14_staticpose.mot
    output_model_file: Subject 14_optmkrpos.osim
    output_marker_file: Subject 14_markeradjustment.xml
    max_marker_movement: -1
    IKTaskSet:
      IKMarkerTask LFHD: apply=false weight=20
      IKMarkerTask RFHD: apply=false weight=20
      IKMarkerTask LBHD: apply=false weight=10
      IKMarkerTask RBHD: apply=false weight=10
      IKMarkerTask THO1: apply=true weight=1
      IKMarkerTask THO2: apply=true weight=1
      IKMarkerTask THO3: apply=true weight=1
      IKMarkerTask CLAV: apply=true weight=50
      IKMarkerTask T8: apply=true weight=20
      IKMarkerTask LSJC: apply=false weight=50
      IKMarkerTask LPUA1: apply=true weight=1
      IKMarkerTask LPUA2: apply=true weight=1
      IKMarkerTask LPUA3: apply=true weight=1
      IKMarkerTask LLEP: apply=true weight=50
      IKMarkerTask LMEP: apply=true weight=10
      IKMarkerTask LEJC: apply=true weight=20
      IKMarkerTask LFA1: apply=true weight=1
      IKMarkerTask LFA2: apply=true weight=1
      IKMarkerTask LFA3: apply=true weight=1
      IKMarkerTask LHNDR: apply=true weight=20
      IKMarkerTask LHNDU: apply=true weight=20
      IKMarkerTask LCAR: apply=true weight=20
      IKMarkerTask RSJC: apply=false weight=50
      IKMarkerTask RPUA1: apply=true weight=1
      IKMarkerTask RPUA2: apply=true weight=1
      IKMarkerTask RPUA3: apply=true weight=1
      IKMarkerTask RLEP: apply=true weight=50
      IKMarkerTask RMEP: apply=true weight=10
      IKMarkerTask REJC: apply=true weight=20
      IKMarkerTask RFA1: apply=true weight=1
      IKMarkerTask RFA2: apply=true weight=1
      IKMarkerTask RFA3: apply=true weight=1
      IKMarkerTask RHNDR: apply=true weight=20
      IKMarkerTask RHNDU: apply=true weight=20
      IKMarkerTask RCAR: apply=true weight=20
      IKMarkerTask LASI: apply=true weight=100
      IKMarkerTask RASI: apply=true weight=100
      IKMarkerTask LPSI: apply=true weight=100
      IKMarkerTask RPSI: apply=true weight=100
      IKMarkerTask LHJC: apply=true weight=100
      IKMarkerTask RHJC: apply=true weight=100
      IKMarkerTask LTH1: apply=true weight=1
      IKMarkerTask LTH2: apply=true weight=1
      IKMarkerTask LTH3: apply=true weight=1
      IKMarkerTask LKJC: apply=true weight=20
      IKMarkerTask LMFC: apply=true weight=20
      IKMarkerTask LLFC: apply=true weight=50
      IKMarkerTask LTB1: apply=true weight=1
      IKMarkerTask LTB2: apply=true weight=1
      IKMarkerTask LTB3: apply=true weight=1
      IKMarkerTask LAJC: apply=true weight=20
      IKMarkerTask LMMAL: apply=true weight=20
      IKMarkerTask LLMAL: apply=true weight=50
      IKMarkerTask LCAL: apply=true weight=10
      IKMarkerTask LMT1: apply=true weight=10
      IKMarkerTask LMT23: apply=true weight=5
      IKMarkerTask LMT5: apply=true weight=10
      IKMarkerTask RTH1: apply=true weight=1
      IKMarkerTask RTH2: apply=true weight=1
      IKMarkerTask RTH3: apply=true weight=1
      IKMarkerTask RKJC: apply=true weight=20
      IKMarkerTask RMFC: apply=true weight=20
      IKMarkerTask RLFC: apply=true weight=100
      IKMarkerTask RTB1: apply=true weight=1
      IKMarkerTask RTB2: apply=true weight=1
      IKMarkerTask RTB3: apply=true weight=1
      IKMarkerTask RAJC: apply=true weight=20
      IKMarkerTask RMMAL: apply=true weight=20
      IKMarkerTask RLMAL: apply=true weight=30
      IKMarkerTask RCAL: apply=true weight=20
      IKMarkerTask RMT1: apply=true weight=10
      IKMarkerTask RMT23: apply=true weight=5
      IKMarkerTask RMT5: apply=true weight=10
      IKCoordinateTask ankle_angle_r: apply=false weight=1000 value_type=default_value value=5
      IKCoordinateTask ankle_angle_l: apply=false weight=1000 value_type=default_value value=5
