# OpenSim document version 30000
ScaleTool:
  mass: 75 [kg]
  height: -1
  age: -1
  ModelScaler:
    apply: true
    scaling_order: manualScale
    time_range: -1 -1
    preserve_mass_distribution: true
    ScaleSet:
      Scale: scales=(1 1 1) segment=ground apply=true
      Scale: scales=(1 1 1) segment=pelvis apply=true
      Scale: scales=(1 1 1) segment=femur_r apply=true
      Scale: scales=(1 1 1) segment=origin_tibia_r apply=true
      Scale: scales=(1 1 1) segment=medial_tibia_body_r apply=true
      Scale: scales=(1 1 1) segment=tibia_r apply=true
      Scale: scales=(1 1 1) segment=talus_r apply=true
      Scale: scales=(1 1 1) segment=calcn_r apply=true
      Scale: scales=(1 1 1) segment=toes_r apply=true
      Scale: scales=(1 1 1) segment=femur_l apply=true
      Scale: scales=(1 1 1) segment=origin_tibia_l apply=true
      Scale: scales=(1 1 1) segment=medial_tibia_body_l apply=true
      Scale: scales=(1 1 1) segment=tibia_l apply=true
      Scale: scales=(1 1 1) segment=talus_l apply=true
      Scale: scales=(1 1 1) segment=calcn_l apply=true
      Scale: scales=(1 1 1) segment=toes_l apply=true
      Scale: scales=(1 1 1) segment=torso apply=true
      Scale: scales=(1 1 1) segment=humerus_r apply=true
      Scale: scales=(1 1 1) segment=ulna_r apply=true
      Scale: scales=(1 1 1) segment=radius_r apply=true
      Scale: scales=(1 1 1) segment=hand_r apply=true
      Scale: scales=(1 1 1) segment=humerus_l apply=true
      Scale: scales=(1 1 1) segment=ulna_l apply=true
      Scale: scales=(1 1 1) segment=radius_l apply=true
      Scale: scales=(1 1 1) segment=hand_l apply=true
  MarkerPlacer:
    apply: true
    time_range: -1 -1
    max_marker_movement: -1
    IKTaskSet:
      IKMarkerTask LFHD: apply=true weight=1
      IKMarkerTask RFHD: apply=true weight=1
      IKMarkerTask LBHD: apply=true weight=1
      IKMarkerTask RBHD: apply=true weight=1
      IKMarkerTask RACR: apply=true weight=100
      IKMarkerTask LACR: apply=true weight=100
      IKMarkerTask C7: apply=true weight=100
      IKMarkerTask T10: apply=true weight=100
      IKMarkerTask CLAV: apply=true weight=100
      IKMarkerTask STRN: apply=true weight=100
      IKMarkerTask RASI: apply=true weight=100
      IKMarkerTask LASI: apply=true weight=100
      IKMarkerTask LPSI: apply=true weight=100
      IKMarkerTask RPSI: apply=true weight=100
      IKMarkerTask LHJC: apply=true weight=100
      IKMarkerTask RHJC: apply=true weight=100
      IKMarkerTask RTH1: apply=true weight=1
      IKMarkerTask RTH2: apply=true weight=1
      IKMarkerTask RTH3: apply=true weight=1
      IKMarkerTask RTH4: apply=true weight=1
      IKMarkerTask RTH5: apply=true weight=1
      IKMarkerTask RTH6: apply=true weight=1
      IKMarkerTask RTH7: apply=true weight=1
      IKMarkerTask RTH8: apply=true weight=1
      IKMarkerTask RTH9: apply=true weight=1
      IKMarkerTask RTH10: apply=true weight=1
      IKMarkerTask RKJC: apply=true weight=100
      IKMarkerTask RTB1: apply=true weight=1
      IKMarkerTask RTB2: apply=true weight=1
      IKMarkerTask RTB3: apply=true weight=1
      IKMarkerTask RTB4: apply=true weight=1
      IKMarkerTask RTB5: apply=true weight=1
      IKMarkerTask RTB6: apply=true weight=1
      IKMarkerTask RTB7: apply=true weight=1
      IKMarkerTask RTB8: apply=true weight=1
      IKMarkerTask RTB9: apply=true weight=1
      IKMarkerTask RTB10: apply=true weight=1
      IKMarkerTask RAJC: apply=true weight=100
      IKMarkerTask RMMAL: apply=true weight=100
      IKMarkerTask RLMAL: apply=true weight=100
      IKMarkerTask RCAL: apply=true weight=100
      IKMarkerTask RMT1: apply=true weight=100
      IKMarkerTask RMT5: apply=true weight=100
      IKMarkerTask LTH1: apply=true weight=1
      IKMarkerTask LTH2: apply=true weight=1
      IKMarkerTask LTH3: apply=true weight=1
      IKMarkerTask LTH4: apply=true weight=1
      IKMarkerTask LTH5: apply=true weight=1
      IKMarkerTask LTH6: apply=true weight=1
      IKMarkerTask LTH7: apply=true weight=1
      IKMarkerTask LTH8: apply=true weight=1
      IKMarkerTask LTH9: apply=true weight=1
      IKMarkerTask LTH10: apply=true weight=1
      IKMarkerTask LKJC: apply=true weight=100
      IKMarkerTask LTB1: apply=true weight=1
      IKMarkerTask LTB2: apply=true weight=1
      IKMarkerTask LTB3: apply=true weight=1
      IKMarkerTask LTB4: apply=true weight=1
      IKMarkerTask LTB5: apply=true weight=1
      IKMarkerTask LTB6: apply=true weight=1
      IKMarkerTask LTB7: apply=true weight=1
      IKMarkerTask LTB8: apply=true weight=1
      IKMarkerTask LTB9: apply=true weight=1
      IKMarkerTask LTB10: apply=true weight=1
      IKMarkerTask LAJC: apply=true weight=100
      IKMarkerTask LMMAL: apply=true weight=100
      IKMarkerTask LLMAL: apply=true weight=100
      IKMarkerTask LCAL: apply=true weight=100
      IKMarkerTask LMT1: apply=true weight=100
      IKMarkerTask LMT5: apply=true weight=100
      IKMarkerTask RUA1: apply=true weight=1
      IKMarkerTask RUA2: apply=true weight=1
      IKMarkerTask RUA3: apply=true weight=1
      IKMarkerTask REJC: apply=true weight=100
      IKMarkerTask RMEL: apply=true weight=100
      IKMarkerTask RLEL: apply=true weight=100
      IKMarkerTask RFA1: apply=true weight=1
      IKMarkerTask RFA2: apply=true weight=1
      IKMarkerTask RFA3: apply=true weight=1
      IKMarkerTask RWJC: apply=true weight=100
      IKMarkerTask RHNR: apply=true weight=100
      IKMarkerTask RHNU: apply=true weight=100
      IKMarkerTask RCAR: apply=true weight=100
      IKMarkerTask LUA1: apply=true weight=1
      IKMarkerTask LUA2: apply=true weight=1
      IKMarkerTask LUA3: apply=true weight=1
      IKMarkerTask LEJC: apply=true weight=100
      IKMarkerTask LMEL: apply=true weight=100
      IKMarkerTask LLEL: apply=true weight=100
      IKMarkerTask LFA1: apply=true weight=1
      IKMarkerTask LFA2: apply=true weight=1
      IKMarkerTask LFA3: apply=true weight=1
      IKMarkerTask LWJC: apply=true weight=100
      IKMarkerTask LHNR: apply=true weight=100
      IKMarkerTask LHNU: apply=true weight=100
      IKMarkerTask LCAR: apply=true weight=100
      IKMarkerTask RSJC: apply=true weight=100
      IKMarkerTask LSJC: apply=true weight=100
