# OpenSim document version 30000
ScaleTool Fullbody_LS_Scaled:
  mass: 71.2 [kg]
  height: -1
  age: -1
  ModelScaler:
    apply: true
    scaling_order: measurements
    marker_file: Static1.trc
    time_range: 3 3.5
    preserve_mass_distribution: true
    MeasurementSet:
      Measurement head: apply=true
        MarkerPair: markers=(LFHD LBHD)
        MarkerPair: markers=(RFHD RBHD)
        BodyScale head: axes=(X Z)
      Measurement torso_height: apply=true
        MarkerPair: markers=(RHJC CLAV)
        MarkerPair: markers=(LHJC CLAV)
        BodyScale torso: axes=Y
      Measurement torso_breadth: apply=true
        MarkerPair: markers=(T8 CLAV)
        MarkerPair: markers=(THO3 CLAV)
        BodyScale torso: axes=X
      Measurement torso_width: apply=true
        MarkerPair: markers=(RACR1 LACR1)
        BodyScale torso: axes=Z
      Measurement Rhumerus: apply=true
        MarkerPair: markers=(RSJC REJC)
        BodyScale humerus_r: axes=(X Y Z)
        Measurement Lhumerus: apply=true
          MarkerPair: markers=(LSJC LEJC)
          BodyScale humerus_l: axes=(X Y Z)
        Measurement R_radius_ulna: apply=true
          MarkerPair: markers=(REJC RWJC)
          BodyScale ulna_r: axes=(X Y Z)
          BodyScale radius_r: axes=(X Y Z)
        Measurement  L_radius_ulna: apply=true
          MarkerPair: markers=(LEJC LWJC)
          BodyScale ulna_l: axes=Y
          BodyScale radius_l: axes=Y
        Measurement R_hand: apply=true
          MarkerPair: markers=(RWJC RCAR)
          BodyScale hand_r: axes=(X Y Z)
        Measurement L_hand: apply=true
          MarkerPair: markers=(LWJC LCAR)
          BodyScale hand_l: axes=(X Y Z)
        Measurement pelvis_w: apply=true
          MarkerPair: markers=(RASI LASI)
          MarkerPair: markers=(RPSI LPSI)
          BodyScale pelvis: axes=Z
        Measurement pelvis_d: apply=true
          MarkerPair: markers=(RPSI RASI)
          MarkerPair: markers=(LPSI LASI)
          BodyScale pelvis: axes=(X Y)
        Measurement pelvis_h: apply=false
          MarkerPair: markers=(RHJC RASI)
          MarkerPair: markers=(LHJC LASI)
          BodyScale pelvis: axes=Y
        Measurement RFemurXY: apply=true
          MarkerPair: markers=(RHJC RMFC)
          MarkerPair: markers=(RHJC RLFC)
          BodyScale femur_r: axes=(X Y)
        Measurement RFemurZ: apply=true
          MarkerPair: markers=(RMFC RLFC)
          BodyScale femur_r: axes=Z
        Measurement RTibiaY: apply=true
          MarkerPair: markers=(RMFC RAJC)
          MarkerPair: markers=(RLFC RAJC)
          BodyScale origin_tibia_r: axes=(X Y)
          BodyScale tibia_r: axes=(X Y Z)
        Measurement RTibiaZ: apply=true
          MarkerPair: markers=(RMMAL RLMAL)
          BodyScale origin_tibia_r: axes=Z
        Measurement RFoot: apply=true
          MarkerPair: markers=(RCAL RMT1)
          MarkerPair: markers=(RCAL RMT5)
          BodyScale talus_r: axes=(X Y Z)
          BodyScale calcn_r: axes=(X Y Z)
          BodyScale toes_r: axes=(X Y Z)
        Measurement LFemurY: apply=true
          MarkerPair: markers=(LHJC LMFC)
          MarkerPair: markers=(LHJC LLFC)
          BodyScale femur_l: axes=(X Y)
        Measurement LFemurZ: apply=true
          MarkerPair: markers=(LMFC LLFC)
          BodyScale femur_l: axes=Z
        Measurement LTibiaY: apply=true
          MarkerPair: markers=(LMFC LAJC)
          MarkerPair: markers=(LLFC LAJC)
          BodyScale origin_tibia_l: axes=(X Y)
          BodyScale tibia_l: axes=(X Y Z)
        Measurement LTibiaZ: apply=true
          MarkerPair: markers=(LLMAL LMMAL)
          BodyScale origin_tibia_l: axes=Z
        Measurement LFoot: apply=true
          MarkerPair: markers=(LCAL LMT5)
          MarkerPair: markers=(LCAL LMT1)
          BodyScale talus_l: axes=(X Y Z)
          BodyScale calcn_l: axes=(X Y Z)
          BodyScale toes_l: axes=(X Y Z)
  MarkerPlacer:
    apply: true
    marker_file: static1.trc
    time_range: 2.5 3
    output_model_file: LSMain_Scaled
    max_marker_movement: -1
    IKTaskSet:
      IKMarkerTask LFHD: apply=true weight=20
      IKMarkerTask RFHD: apply=true weight=20
      IKMarkerTask LBHD: apply=true weight=40
      IKMarkerTask RBHD: apply=true weight=40
      IKMarkerTask THO1: apply=false weight=5
      IKMarkerTask THO2: apply=false weight=5
      IKMarkerTask THO3: apply=false weight=5
      IKMarkerTask CLAV: apply=true weight=30
      IKMarkerTask T8: apply=true weight=30
      IKMarkerTask LACR4: apply=false weight=20
      IKMarkerTask LSJC: apply=false weight=5
      IKMarkerTask LLEP: apply=true weight=10
      IKMarkerTask LEJC: apply=true weight=30
      IKMarkerTask LWRU: apply=true weight=10
      IKMarkerTask LWJC: apply=true weight=10
      IKMarkerTask LHNDR: apply=false weight=5
      IKMarkerTask LHNDU: apply=false weight=5
      IKMarkerTask LCAR: apply=true weight=5
      IKMarkerTask RACR4: apply=false weight=20
      IKMarkerTask RSJC: apply=false weight=5
      IKMarkerTask RLEP: apply=true weight=10
      IKMarkerTask REJC: apply=true weight=30
      IKMarkerTask RWRU: apply=true weight=10
      IKMarkerTask RWJC: apply=true weight=10
      IKMarkerTask RHNDR: apply=false weight=5
      IKMarkerTask RHNDU: apply=false weight=5
      IKMarkerTask RCAR: apply=true weight=5
      IKMarkerTask LASI: apply=true weight=100
      IKMarkerTask RASI: apply=true weight=100
      IKMarkerTask LPSI: apply=true weight=100
      IKMarkerTask RPSI: apply=true weight=100
      IKMarkerTask LHJC: apply=true weight=50
      IKMarkerTask RHJC: apply=true weight=50
      IKMarkerTask LTH1: apply=false weight=1
      IKMarkerTask LTH2: apply=false weight=1
      IKMarkerTask LTH3: apply=false weight=1
      IKMarkerTask LKJC: apply=false weight=50
      IKMarkerTask LMFC: apply=true weight=20
      IKMarkerTask LLFC: apply=true weight=30
      IKMarkerTask LTB1: apply=false weight=1
      IKMarkerTask LTB2: apply=false weight=1
      IKMarkerTask LTB3: apply=false weight=1
      IKMarkerTask LAJC: apply=false weight=50
      IKMarkerTask LMMAL: apply=true weight=30
      IKMarkerTask LLMAL: apply=true weight=30
      IKMarkerTask LCAL: apply=true weight=20
      IKMarkerTask LMT1: apply=true weight=5
      IKMarkerTask LMT23: apply=true weight=5
      IKMarkerTask LMT5: apply=true weight=10
      IKMarkerTask RTH1: apply=false weight=1
      IKMarkerTask RTH2: apply=false weight=1
      IKMarkerTask RTH3: apply=false weight=1
      IKMarkerTask RKJC: apply=false weight=50
      IKMarkerTask RMFC: apply=true weight=20
      IKMarkerTask RLFC: apply=true weight=30
      IKMarkerTask RTB1: apply=false weight=1
      IKMarkerTask RTB2: apply=false weight=1
      IKMarkerTask RTB3: apply=false weight=1
      IKMarkerTask RAJC: apply=false weight=50
      IKMarkerTask RMMAL: apply=true weight=30
      IKMarkerTask RLMAL: apply=true weight=30
      IKMarkerTask RCAL: apply=true weight=20
      IKMarkerTask RMT1: apply=true weight=5
      IKMarkerTask RMT23: apply=true weight=5
      IKMarkerTask RMT5: apply=true weight=10
      IKCoordinateTask ankle_angle_r: apply=false weight=1000 value_type=default_value value=0
      IKCoordinateTask ankle_angle_l: apply=false weight=1000 value_type=default_value value=0
      IKCoordinateTask neck_extension: apply=true weight=500 value_type=default_value value=0
