# OpenSim document version 30000
ScaleTool Fullbody_LS_Scaled:
  mass: 70 [kg]
  height: -1
  age: -1
  ModelScaler:
    apply: true
    scaling_order: measurements
    time_range: 0 0.1
    preserve_mass_distribution: true
    MeasurementSet:
      Measurement head: apply=true
        MarkerPair: markers=(LFHD LBHD)
        MarkerPair: markers=(RFHD RBHD)
        BodyScale head: axes=(X Z)
      Measurement torso_height: apply=true
        MarkerPair: markers=(RHJC CLAV)
        MarkerPair: markers=(LHJC CLAV)
        BodyScale torso: axes=Y
      Measurement torso_breadth: apply=true
        MarkerPair: markers=(T8 CLAV)
        MarkerPair: markers=(THO3 CLAV)
        BodyScale torso: axes=X
      Measurement torso_width: apply=true
        MarkerPair: markers=(RSJC LSJC)
        BodyScale torso: axes=Z
      Measurement Rhumerus: apply=true
        MarkerPair: markers=(RSJC REJC)
        BodyScale humerus_r: axes=(X Y Z)
      Measurement Lhumerus: apply=true
        MarkerPair: markers=(LSJC LEJC)
        BodyScale humerus_l: axes=(X Y Z)
      Measurement R_radius_ulna: apply=true
        MarkerPair: markers=(REJC RWJC)
        BodyScale ulna_r: axes=(X Y Z)
        BodyScale radius_r: axes=(X Y Z)
      Measurement  L_radius_ulna: apply=true
        MarkerPair: markers=(LEJC LWJC)
        BodyScale ulna_l: axes=Y
        BodyScale radius_l: axes=Y
      Measurement R_hand: apply=true
        MarkerPair: markers=(RWJC RCAR)
        BodyScale hand_r: axes=(X Y Z)
      Measurement L_hand: apply=true
        MarkerPair: markers=(LWJC LCAR)
        BodyScale hand_l: axes=(X Y Z)
      Measurement pelvis_w: apply=true
        MarkerPair: markers=(RASI LASI)
        MarkerPair: markers=(RPSI LPSI)
        BodyScale pelvis: axes=Z
      Measurement pelvis_d: apply=true
        MarkerPair: markers=(RPSI RASI)
        MarkerPair: markers=(LPSI LASI)
        BodyScale pelvis: axes=(X Y)
      Measurement pelvis_h: apply=false
        MarkerPair: markers=(RHJC RASI)
        MarkerPair: markers=(LHJC LASI)
        BodyScale pelvis: axes=Y
      Measurement RFemurXY: apply=true
        MarkerPair: markers=(RHJC RMFC)
        MarkerPair: markers=(RHJC RLFC)
        BodyScale femur_r: axes=(X Y)
      Measurement RFemurZ: apply=true
        MarkerPair: markers=(RMFC RLFC)
        BodyScale femur_r: axes=Z
      Measurement RTibiaY: apply=true
        MarkerPair: markers=(RMFC RAJC)
        MarkerPair: markers=(RLFC RAJC)
        BodyScale origin_tibia_r: axes=(X Y)
        BodyScale tibia_r: axes=(X Y Z)
      Measurement RTibiaZ: apply=true
        MarkerPair: markers=(RMMAL RLMAL)
        BodyScale origin_tibia_r: axes=Z
      Measurement RFoot: apply=true
        MarkerPair: markers=(RCAL RMT1)
        MarkerPair: markers=(RCAL RMT5)
        BodyScale talus_r: axes=(X Y Z)
        BodyScale calcn_r: axes=(X Y Z)
        BodyScale toes_r: axes=(X Y Z)
      Measurement LFemurXY: apply=true
        MarkerPair: markers=(LHJC LMFC)
        MarkerPair: markers=(LHJC LLFC)
        BodyScale femur_l: axes=(X Y)
      Measurement LFemurZ: apply=true
        MarkerPair: markers=(LMFC LLFC)
        BodyScale femur_l: axes=Z
      Measurement LTibiaY: apply=true
        MarkerPair: markers=(LMFC LAJC)
        MarkerPair: markers=(LLFC LAJC)
        BodyScale origin_tibia_l: axes=(X Y)
        BodyScale tibia_l: axes=(X Y Z)
      Measurement LTibiaZ: apply=true
        MarkerPair: markers=(LLMAL LMMAL)
        BodyScale origin_tibia_l: axes=Z
      Measurement LFoot: apply=true
        MarkerPair: markers=(LCAL LMT5)
        MarkerPair: markers=(LCAL LMT1)
        BodyScale talus_l: axes=(X Y Z)
        BodyScale calcn_l: axes=(X Y Z)
        BodyScale toes_l: axes=(X Y Z)
    ScaleSet:
      Scale: scales=(1 1 1) segment=medialTibia_r apply=true
      Scale: scales=(1 1 1) segment=lateralTibia_r apply=true
      Scale: scales=(1 1 1) segment=medialTibia_l apply=true
      Scale: scales=(1 1 1) segment=lateralTibia_l apply=true
  MarkerPlacer:
    apply: false
    output_model_file: LSMain_Scaled
    max_marker_movement: -1
    IKTaskSet:
      IKMarkerTask LFHD: apply=false weight=1
      IKMarkerTask RFHD: apply=false weight=1
      IKMarkerTask LBHD: apply=false weight=1
      IKMarkerTask RBHD: apply=false weight=1
      IKMarkerTask THO1: apply=false weight=5
      IKMarkerTask THO2: apply=false weight=5
      IKMarkerTask THO3: apply=false weight=5
      IKMarkerTask CLAV: apply=false weight=30
      IKMarkerTask T8: apply=false weight=10
      IKMarkerTask LACR4: apply=false weight=20
      IKMarkerTask LSJC: apply=false weight=5
      IKMarkerTask LLEP: apply=false weight=1
      IKMarkerTask LEJC: apply=false weight=1
      IKMarkerTask LWRU: apply=false weight=1
      IKMarkerTask LWJC: apply=false weight=1
      IKMarkerTask LHNDR: apply=false weight=5
      IKMarkerTask LHNDU: apply=false weight=5
      IKMarkerTask LCAR: apply=false weight=1
      IKMarkerTask RACR4: apply=false weight=20
      IKMarkerTask RSJC: apply=false weight=5
      IKMarkerTask RLEP: apply=false weight=1
      IKMarkerTask REJC: apply=false weight=1
      IKMarkerTask RWRU: apply=false weight=1
      IKMarkerTask RWJC: apply=false weight=1
      IKMarkerTask RHNDR: apply=false weight=5
      IKMarkerTask RHNDU: apply=false weight=5
      IKMarkerTask RCAR: apply=false weight=1
      IKMarkerTask LASI: apply=false weight=10
      IKMarkerTask RASI: apply=false weight=10
      IKMarkerTask LPSI: apply=false weight=10
      IKMarkerTask RPSI: apply=false weight=10
      IKMarkerTask LHJC: apply=false weight=10
      IKMarkerTask RHJC: apply=false weight=10
      IKMarkerTask LTH1: apply=false weight=1
      IKMarkerTask LTH2: apply=false weight=1
      IKMarkerTask LTH3: apply=false weight=1
      IKMarkerTask LKJC: apply=false weight=50
      IKMarkerTask LMFC: apply=false weight=10
      IKMarkerTask LLFC: apply=false weight=10
      IKMarkerTask LTB1: apply=false weight=1
      IKMarkerTask LTB2: apply=false weight=1
      IKMarkerTask LTB3: apply=false weight=1
      IKMarkerTask LAJC: apply=false weight=50
      IKMarkerTask LMMAL: apply=false weight=10
      IKMarkerTask LLMAL: apply=false weight=10
      IKMarkerTask LCAL: apply=false weight=10
      IKMarkerTask LMT1: apply=false weight=5
      IKMarkerTask LMT23: apply=false weight=5
      IKMarkerTask LMT5: apply=false weight=10
      IKMarkerTask RTH1: apply=false weight=1
      IKMarkerTask RTH2: apply=false weight=1
      IKMarkerTask RTH3: apply=false weight=1
      IKMarkerTask RKJC: apply=false weight=10
      IKMarkerTask RMFC: apply=false weight=10
      IKMarkerTask RLFC: apply=false weight=10
      IKMarkerTask RTB1: apply=false weight=1
      IKMarkerTask RTB2: apply=false weight=1
      IKMarkerTask RTB3: apply=false weight=1
      IKMarkerTask RAJC: apply=false weight=50
      IKMarkerTask RMMAL: apply=false weight=10
      IKMarkerTask RLMAL: apply=false weight=10
      IKMarkerTask RCAL: apply=false weight=10
      IKMarkerTask RMT1: apply=false weight=5
      IKMarkerTask RMT23: apply=false weight=5
      IKMarkerTask RMT5: apply=false weight=10
      IKCoordinateTask ankle_angle_r: apply=false weight=1000 value_type=default_value value=0
      IKCoordinateTask ankle_angle_l: apply=false weight=1000 value_type=default_value value=0
      IKCoordinateTask neck_extension: apply=false weight=500 value_type=default_value value=0
