# OpenSim document version 30000
ScaleTool:
  mass: 75 [kg]
  height: -1
  age: -1
  ModelScaler:
    apply: true
    scaling_order: measurements manualScale
    time_range: 0 0.1
    preserve_mass_distribution: true
    MeasurementSet:
      Measurement PelvisZ: apply=true
        MarkerPair: markers=(LPSI RPSI)
        MarkerPair: markers=(RASI LASI)
        BodyScale pelvis: axes=Z
      Measurement TorsoX: apply=true
        MarkerPair: markers=(STRN T10)
        MarkerPair: markers=(C7 CLAV)
        BodyScale torso: axes=X
      Measurement TorsoY: apply=true
        MarkerPair: markers=(LHJC LACR)
        MarkerPair: markers=(RHJC RACR)
        BodyScale torso: axes=Y
      Measurement TorsoZ: apply=true
        MarkerPair: markers=(RACR LACR)
        BodyScale torso: axes=Z
      Measurement RUpperArm: apply=true
        MarkerPair: markers=(RSJC REJC)
        BodyScale humerus_r: axes=(X Y Z)
      Measurement LUpperArm: apply=true
        MarkerPair: markers=(LSJC LEJC)
        BodyScale humerus_l: axes=(X Y Z)
      Measurement RForeArm: apply=true
        MarkerPair: markers=(REJC RWJC)
        BodyScale ulna_r: axes=(X Y Z)
        BodyScale radius_r: axes=(X Y Z)
      Measurement LForeArm: apply=true
        MarkerPair: markers=(LEJC LWJC)
        BodyScale ulna_l: axes=(X Y Z)
        BodyScale radius_l: axes=(X Y Z)
      Measurement LHand: apply=true
        MarkerPair: markers=(LWJC LCAR)
        BodyScale hand_l: axes=(X Y Z)
      Measurement RFemurX: apply=false
        MarkerPair: markers=(RMFC RLFC)
      Measurement RFemurY: apply=true
        MarkerPair: markers=(RHJC RMFC)
        MarkerPair: markers=(RHJC RLFC)
        BodyScale femur_r: axes=(X Y)
      Measurement RFemurZ: apply=true
        MarkerPair: markers=(RMFC RLFC)
        BodyScale femur_r: axes=Z
      Measurement LFemurX: apply=false
        MarkerPair: markers=(LMFC LLFC)
      Measurement LFemurY: apply=true
        MarkerPair: markers=(LHJC LMFC)
        MarkerPair: markers=(LHJC LLFC)
        BodyScale femur_l: axes=(X Y)
      Measurement LFemurZ: apply=true
        MarkerPair: markers=(LMFC LLFC)
        BodyScale femur_l: axes=Z
      Measurement RTibiaX: apply=false
        MarkerPair: markers=(RMMAL RLMAL)
      Measurement RTibiaY: apply=true
        MarkerPair: markers=(RMFC RAJC)
        MarkerPair: markers=(RLFC RAJC)
        BodyScale origin_tibia_r: axes=(X Y)
        BodyScale tibia_r: axes=(X Y Z)
      Measurement RTibiaZ: apply=true
        MarkerPair: markers=(RMMAL RLMAL)
        BodyScale origin_tibia_r: axes=Z
      Measurement LTibiaX: apply=false
        MarkerPair: markers=(LLMAL LMMAL)
      Measurement LTibiaY: apply=true
        MarkerPair: markers=(LMFC LAJC)
        MarkerPair: markers=(LLFC LAJC)
        BodyScale origin_tibia_l: axes=(X Y)
        BodyScale tibia_l: axes=(X Y Z)
      Measurement LTibiaZ: apply=true
        MarkerPair: markers=(LLMAL LMMAL)
        BodyScale origin_tibia_l: axes=Z
      Measurement RFoot: apply=true
        MarkerPair: markers=(RCAL RMT1)
        MarkerPair: markers=(RCAL RMT5)
        BodyScale talus_r: axes=(X Y Z)
        BodyScale calcn_r: axes=(X Y Z)
        BodyScale toes_r: axes=(X Y Z)
      Measurement LFoot: apply=true
        MarkerPair: markers=(LCAL LMT5)
        MarkerPair: markers=(LCAL LMT1)
        BodyScale talus_l: axes=(X Y Z)
        BodyScale calcn_l: axes=(X Y Z)
        BodyScale toes_l: axes=(X Y Z)
      Measurement RHand: apply=true
        MarkerPair: markers=(RWJC RCAR)
        BodyScale hand_r: axes=(X Y Z)
      Measurement PelvisX: apply=true
        MarkerPair: markers=(LPSI LASI)
        MarkerPair: markers=(RPSI RASI)
        BodyScale pelvis: axes=(X Y)
    ScaleSet:
      Scale: scales=(1 1 1) segment=medial_tibia_body_r apply=true
      Scale: scales=(1 1 1) segment=tibia_r apply=true
      Scale: scales=(1 1 1) segment=medial_tibia_body_l apply=true
      Scale: scales=(1 1 1) segment=tibia_l apply=true
  MarkerPlacer:
    apply: false
    time_range: -1 -1
    max_marker_movement: -1
    IKTaskSet:
      IKMarkerTask RACR: apply=false weight=1
      IKMarkerTask LACR: apply=false weight=1
      IKMarkerTask C7: apply=false weight=1
      IKMarkerTask T10: apply=false weight=1
      IKMarkerTask CLAV: apply=false weight=1
      IKMarkerTask STRN: apply=false weight=1
      IKMarkerTask RASI: apply=false weight=1
      IKMarkerTask LASI: apply=false weight=1
      IKMarkerTask LPSI: apply=false weight=1
      IKMarkerTask RPSI: apply=false weight=1
      IKMarkerTask LHJC: apply=false weight=1
      IKMarkerTask RHJC: apply=false weight=1
      IKMarkerTask RTH1: apply=false weight=1
      IKMarkerTask RTH2: apply=false weight=1
      IKMarkerTask RTH3: apply=false weight=1
      IKMarkerTask RTH4: apply=false weight=1
      IKMarkerTask RTH5: apply=false weight=1
      IKMarkerTask RTH6: apply=false weight=1
      IKMarkerTask RTH7: apply=false weight=1
      IKMarkerTask RTH8: apply=false weight=1
      IKMarkerTask RTH9: apply=false weight=1
      IKMarkerTask RTH10: apply=false weight=1
      IKMarkerTask RKJC: apply=false weight=1
      IKMarkerTask RTB1: apply=false weight=1
      IKMarkerTask RTB2: apply=false weight=1
      IKMarkerTask RTB3: apply=false weight=1
      IKMarkerTask RTB4: apply=false weight=1
      IKMarkerTask RTB5: apply=false weight=1
      IKMarkerTask RTB6: apply=false weight=1
      IKMarkerTask RTB7: apply=false weight=1
      IKMarkerTask RTB8: apply=false weight=1
      IKMarkerTask RTB9: apply=false weight=1
      IKMarkerTask RTB10: apply=false weight=1
      IKMarkerTask RAJC: apply=false weight=1
      IKMarkerTask RCAL: apply=false weight=1
      IKMarkerTask RMT1: apply=false weight=1
      IKMarkerTask RMT5: apply=false weight=1
      IKMarkerTask LTH1: apply=false weight=1
      IKMarkerTask LTH2: apply=false weight=1
      IKMarkerTask LTH3: apply=false weight=1
      IKMarkerTask LTH4: apply=false weight=1
      IKMarkerTask LTH5: apply=false weight=1
      IKMarkerTask LTH6: apply=false weight=1
      IKMarkerTask LTH7: apply=false weight=1
      IKMarkerTask LTH8: apply=false weight=1
      IKMarkerTask LTH9: apply=false weight=1
      IKMarkerTask LTH10: apply=false weight=1
      IKMarkerTask LKJC: apply=false weight=1
      IKMarkerTask LTB1: apply=false weight=1
      IKMarkerTask LTB2: apply=false weight=1
      IKMarkerTask LTB3: apply=false weight=1
      IKMarkerTask LTB4: apply=false weight=1
      IKMarkerTask LTB5: apply=false weight=1
      IKMarkerTask LTB6: apply=false weight=1
      IKMarkerTask LTB7: apply=false weight=1
      IKMarkerTask LTB8: apply=false weight=1
      IKMarkerTask LTB9: apply=false weight=1
      IKMarkerTask LTB10: apply=false weight=1
      IKMarkerTask LAJC: apply=false weight=1
      IKMarkerTask LCAL: apply=false weight=1
      IKMarkerTask LMT1: apply=false weight=1
      IKMarkerTask LMT5: apply=false weight=1
      IKMarkerTask RUA1: apply=false weight=1
      IKMarkerTask RUA2: apply=false weight=1
      IKMarkerTask RUA3: apply=false weight=1
      IKMarkerTask REJC: apply=false weight=1
      IKMarkerTask RFA1: apply=false weight=1
      IKMarkerTask RFA2: apply=false weight=1
      IKMarkerTask RFA3: apply=false weight=1
      IKMarkerTask RWJC: apply=false weight=1
      IKMarkerTask RHNR: apply=false weight=1
      IKMarkerTask RHNU: apply=false weight=1
      IKMarkerTask RCAR: apply=false weight=1
      IKMarkerTask LUA1: apply=false weight=1
      IKMarkerTask LUA2: apply=false weight=1
      IKMarkerTask LUA3: apply=false weight=1
      IKMarkerTask LEJC: apply=false weight=1
      IKMarkerTask LFA1: apply=false weight=1
      IKMarkerTask LFA2: apply=false weight=1
      IKMarkerTask LFA3: apply=false weight=1
      IKMarkerTask LWJC: apply=false weight=1
      IKMarkerTask LHNR: apply=false weight=1
      IKMarkerTask LHNU: apply=false weight=1
      IKMarkerTask LCAR: apply=false weight=1
      IKMarkerTask RSJC: apply=false weight=1
      IKMarkerTask LSJC: apply=false weight=1
