# OpenSim document version 30000
AnalyzeTool LoadSharing_023:
  replace_force_set: false
  results_directory: .
  output_precision: 8
  initial_time: 0
  final_time: 1
  solve_for_equilibrium_for_auxiliary_states: false
  maximum_number_of_integrator_steps: 20000
  maximum_integrator_step_size: 1
  minimum_integrator_step_size: 1e-8
  integrator_error_tolerance: 1e-5
  lowpass_cutoff_frequency_for_coordinates: -1
  AnalysisSet Analyses:
    ProbeReporter: start_time=0 end_time=1 step_interval=1 in_degrees=true
    Kinematics: start_time=0 end_time=1 step_interval=1 in_degrees=true
