# OpenSim document version 30000
Model LoadSharing_023:
  length_units: meters
  force_units: N
  gravity: 0 -9.80665 0
  credits:
    Delp S.L., Loan J.P., Hoy M.G., Zajac F.E., Topp E.L., Rosen J.M., Thelen D.G., Anderson F.C., Seth A., Hamner S.R.
  publications:
    Notes: 3D, 23 DOF gait model created by D.G. Thelen, Univ. of Wisconsin-Madison, and Ajay Seth, Frank C. Anderson, and Scott L. Delp, Stanford University. Lower extremity joint defintions based on Delp et al. (1990). Low back joint and anthropometry based on Anderson and Pandy (1999, 2001). Planar knee model of Yamaguchi and Zajac (1989). Seth removed the patella to avoid kinematic constraints; insertions of the quadrucepts are handled with moving points in the tibia frame. Delp, S.L., Loan, J.P., Hoy, M.G., Zajac, F.E., Topp E.L., Rosen, J.M.: An interactive graphics-based model of the lower extremity to study orthopaedic surgical procedures, IEEE Transactions on Biomedical Engineering, vol. 37, pp. 757-767, 1990. Yamaguchi G.T., Zajac F.E.: A planar model of the knee joint to characterize the knee extensor mechanism." J . Biomecl7. vol. 21. pp. 1-10. 1989. Anderson F.C., Pandy M.G.: A dynamic optimization solution for vertical jumping in three dimensions. Computer Methods in Biomechanics and Biomedical Engineering 2:201-231, 1999. Anderson F.C., Pandy M.G.: Dynamic optimization of human walking. Journal of Biomechanical Engineering 123:381-390, 2001.
  defaults: Thelen2003Muscle default: min_control=0.01 max_control=1 optimal_force=1 max_isometric_force=0
      optimal_fiber_length=0 tendon_slack_length=0 pennation_angle_at_optimal=0 [radians] max_contraction_velocity=10
      activation_time_constant=0.01 deactivation_time_constant=0.04 FmaxTendonStrain=0.033 FmaxMuscleStrain=0.6
      KshapeActive=0.5 KshapePassive=4 Af=0.3 Flen=1.8
  BodySet:
    Body ground: mass=0 mass_center=(0 0 0) inertia_xx=0 inertia_yy=0 inertia_zz=0
    Body pelvis: mass=13.23397 mass_center=(-0.084514 0 0) inertia_xx=0.1155178 inertia_yy=0.09787545
        inertia_zz=0.06506301 meshes=(sacrum.vtp pelvis.vtp l_pelvis.vtp)
      CustomJoint ground_pelvis: parent_body=ground location_in_parent=(0 0.957 0) location=(0 0 0)
        Coordinate pelvis_tilt: motion_type=rotational default_value=0 range=(-1.570796 1.570796) clamped=true
        Coordinate pelvis_list: motion_type=rotational default_value=0 range=(-1.570796 1.570796) clamped=true
        Coordinate pelvis_rotation: motion_type=rotational default_value=0 range=(-4.712389 4.712389) clamped=true
        Coordinate pelvis_tx: motion_type=translational default_value=0 range=(-5 5) clamped=true
        Coordinate pelvis_ty: motion_type=translational default_value=0 range=(-1 2) clamped=true
        Coordinate pelvis_tz: motion_type=translational default_value=0 range=(-3 3) clamped=true
        SpatialTransform:
          TransformAxis rotation1: coordinates=pelvis_tilt axis=(0 0 1) LinearFunction(coefficients=1 0)
          TransformAxis rotation2: coordinates=pelvis_list axis=(1 0 0) LinearFunction(coefficients=1 0)
          TransformAxis rotation3: coordinates=pelvis_rotation axis=(0 1 0) LinearFunction(coefficients=1 0)
          TransformAxis translation1: coordinates=pelvis_tx axis=(1 0 0) LinearFunction(coefficients=1 0)
          TransformAxis translation2: coordinates=pelvis_ty axis=(0 1 0) LinearFunction(coefficients=1 0)
          TransformAxis translation3: coordinates=pelvis_tz axis=(0 0 1) LinearFunction(coefficients=1 0)
    Body femur_r: mass=10.45211 mass_center=(0 -0.182998 0) inertia_xx=0.1504652 inertia_yy=0.03944235
        inertia_zz=0.1586684 meshes=femur_r.vtp
      CustomJoint hip_r: parent_body=pelvis location_in_parent=(-0.08451397 -0.0708308 0.102856) location=(0 0 0)
        Coordinate hip_flexion_r: motion_type=rotational default_value=0 range=(-2.094395 2.094395) clamped=true
        Coordinate hip_adduction_r: motion_type=rotational default_value=0 range=(-2.094395 2.094395) clamped=true
        Coordinate hip_rotation_r: motion_type=rotational default_value=0 range=(-2.094395 2.094395) clamped=true
        SpatialTransform: axes_held_at_zero=(translation1 translation2 translation3)
          TransformAxis rotation1: coordinates=hip_flexion_r axis=(0 0 1) LinearFunction(coefficients=1 0)
          TransformAxis rotation2: coordinates=hip_adduction_r axis=(1 0 0) LinearFunction(coefficients=1 0)
          TransformAxis rotation3: coordinates=hip_rotation_r axis=(0 1 0) LinearFunction(coefficients=1 0)
    Body origin_tibia_r: mass=4.166168 mass_center=(0 -0.198786 0) inertia_xx=0.05663516 inertia_yy=0.00573094
        inertia_zz=0.05742176 meshes=(tibia_r.vtp fibula_r.vtp)
      CustomJoint knee_r: parent_body=femur_r location_in_parent=(0 0 0) location=(0 0 0)
        Coordinate knee_angle_r: motion_type=rotational default_value=0 range=(-2.094395 0.1745329) clamped=true
        Coordinate knee_adduction_r: motion_type=rotational default_value=0 range=(-2.094395 0.1745329) clamped=false
        Coordinate knee_rotation_r: motion_type=rotational default_value=0 range=(-0.087 0.349065) clamped=true
        SpatialTransform: axes_held_at_zero=translation3
          TransformAxis rotation1: coordinates=knee_angle_r axis=(0 0 1) LinearFunction(coefficients=1 0)
          TransformAxis rotation2: coordinates=knee_adduction_r axis=(1 0 0) LinearFunction(coefficients=1 0)
          TransformAxis rotation3: coordinates=knee_rotation_r axis=(0 1 0) LinearFunction(coefficients=1 0)
          TransformAxis translation1: coordinates=knee_angle_r axis=(1 0 0)
            MultiplierFunction: scale=1.076459
              SimmSpline: x=(-2.0944 -1.74533 -1.39626 -1.0472 -0.698132 -0.349066 -0.174533 0.197344 0.337395 0.490178 1.52146 2.0944)
                  y=(-0.0032 0.00179 0.00411 0.0041 0.00212 -0.001 -0.0031 -0.005227 -0.005435 -0.005574 -0.005435 -0.00525)
          TransformAxis translation2: coordinates=knee_angle_r axis=(0 1 0)
            MultiplierFunction: scale=1.076459
              SimmSpline: x=(-2.0944 -1.22173 -0.523599 -0.349066 -0.174533 0.159149 2.0944)
                  y=(-0.4226 -0.4082 -0.399 -0.3976 -0.3966 -0.395264 -0.396)
    Body medialTibia_r: mass=1e-8 mass_center=(0 0 0) inertia_xx=1e-8 inertia_yy=1e-8 inertia_zz=1e-8 meshes=Cube.vtp
      CustomJoint medialTibia_r: parent_body=origin_tibia_r location_in_parent=(0 -0.035 -0.02)
          location=(0 -0.035 -0.02)
        Coordinate medialTibiaPivotPoint_flex_r: motion_type=rotational default_value=0 range=(0 0) clamped=false
            locked=true
        Coordinate medialTibiaPivotPoint_add_r: motion_type=rotational default_value=0 range=(0 0) clamped=false
            locked=true
        Coordinate medialTibiaPivotPoint_int_r: motion_type=rotational default_value=0 range=(0 0) clamped=false
            locked=true
        SpatialTransform: axes_held_at_zero=(translation1 translation2 translation3)
          TransformAxis rotation1: coordinates=medialTibiaPivotPoint_flex_r axis=(0 0 1)
              LinearFunction(coefficients=1 0)
          TransformAxis rotation2: coordinates=medialTibiaPivotPoint_add_r axis=(1 0 0)
              LinearFunction(coefficients=1 0)
          TransformAxis rotation3: coordinates=medialTibiaPivotPoint_int_r axis=(0 1 0)
              LinearFunction(coefficients=1 0)
    Body lateralTibia_r: mass=1e-8 mass_center=(0 0 0) inertia_xx=1e-8 inertia_yy=1e-8 inertia_zz=1e-8 meshes=Cube.vtp
      CustomJoint lateralTibia_r: parent_body=medialTibia_r location_in_parent=(0 -0.035 0.02) location=(0 -0.035 0.02)
        Coordinate lateralTibiaPivotPoint_flex_r: motion_type=rotational default_value=0 range=(0 0) clamped=false
            locked=true
        Coordinate lateralTibiaPivotPoint_add_r: motion_type=rotational default_value=0 range=(0 0) clamped=false
            locked=true
        Coordinate lateralTibiaPivotPoint_int_r: motion_type=rotational default_value=0 range=(0 0) clamped=false
            locked=true
        SpatialTransform: axes_held_at_zero=(translation1 translation2 translation3)
          TransformAxis rotation1: coordinates=lateralTibiaPivotPoint_flex_r axis=(0 0 1)
              LinearFunction(coefficients=1 0)
          TransformAxis rotation2: coordinates=lateralTibiaPivotPoint_add_r axis=(1 0 0)
              LinearFunction(coefficients=1 0)
          TransformAxis rotation3: coordinates=lateralTibiaPivotPoint_int_r axis=(0 1 0)
              LinearFunction(coefficients=1 0)
    Body talus_r: mass=0.1123713 mass_center=(0 0 0) inertia_xx=0.00112371 inertia_yy=0.00112371 inertia_zz=0.00112371
        meshes=talus.vtp
      CustomJoint ankle_r: parent_body=origin_tibia_r location_in_parent=(0 -0.457836 0) location=(0 0 0)
        Coordinate ankle_angle_r: motion_type=rotational default_value=0 range=(-1.570796 1.570796) clamped=true
        SpatialTransform: axes_held_at_zero=(rotation2 rotation3 translation1 translation2 translation3)
          TransformAxis rotation1: coordinates=ankle_angle_r axis=(-0.1050135 -0.1740224 0.9791263)
              LinearFunction(coefficients=1 0)
    Body calcn_r: mass=1.404642 mass_center=(0.117331 0.03 0) inertia_xx=0.0015732 inertia_yy=0.00438248
        inertia_zz=0.00460723 meshes=foot.vtp
      CustomJoint subtalar_r: parent_body=talus_r location_in_parent=(-0.05722208 -0.04466562 0.0084327)
          location=(0 0 0)
        Coordinate subtalar_angle_r: motion_type=rotational default_value=0 range=(-1.570796 1.570796) clamped=true
            locked=true
        SpatialTransform: axes_held_at_zero=(rotation2 rotation3 translation1 translation2 translation3)
          TransformAxis rotation1: coordinates=subtalar_angle_r axis=(0.7871796 0.6047475 -0.1209495)
              LinearFunction(coefficients=1 0)
    Body toes_r: mass=0.2433964 mass_center=(0.0294236 0.006 -0.0175) inertia_xx=0.00011237 inertia_yy=0.00022474
        inertia_zz=0.00112371 meshes=bofoot.vtp
      CustomJoint mtp_r: parent_body=calcn_r location_in_parent=(0.2097869 -0.002 0.00108) location=(0 0 0)
        Coordinate mtp_angle_r: motion_type=rotational default_value=0 range=(-1.570796 1.570796) clamped=true
            locked=true
        SpatialTransform: axes_held_at_zero=(rotation2 rotation3 translation1 translation2 translation3)
          TransformAxis rotation1: coordinates=mtp_angle_r axis=(-0.5809544 0 0.8139361)
              LinearFunction(coefficients=1 0)
    Body femur_l: mass=10.45211 mass_center=(0 -0.184556 0) inertia_xx=0.1504652 inertia_yy=0.03944235
        inertia_zz=0.1586684 meshes=l_femur.vtp
      CustomJoint hip_l: parent_body=pelvis location_in_parent=(-0.08451397 -0.0708308 -0.102856) location=(0 0 0)
        Coordinate hip_flexion_l: motion_type=rotational default_value=0 range=(-2.094395 2.094395) clamped=true
        Coordinate hip_adduction_l: motion_type=rotational default_value=0 range=(-2.094395 2.094395) clamped=true
        Coordinate hip_rotation_l: motion_type=rotational default_value=0 range=(-2.094395 2.094395) clamped=true
        SpatialTransform: axes_held_at_zero=(translation1 translation2 translation3)
          TransformAxis rotation1: coordinates=hip_flexion_l axis=(0 0 1) LinearFunction(coefficients=1 0)
          TransformAxis rotation2: coordinates=hip_adduction_l axis=(-1 0 0) LinearFunction(coefficients=1 0)
          TransformAxis rotation3: coordinates=hip_rotation_l axis=(0 -1 0) LinearFunction(coefficients=1 0)
    Body origin_tibia_l: mass=4.166168 mass_center=(0 -0.197738 0) inertia_xx=0.05663516 inertia_yy=0.00573094
        inertia_zz=0.05742176 meshes=(l_tibia.vtp l_fibula.vtp)
      CustomJoint knee_l: parent_body=femur_l location_in_parent=(0 0 0) location=(0 0 0)
        Coordinate knee_angle_l: motion_type=rotational default_value=0 range=(-2.094395 0.1745329) clamped=true
        Coordinate knee_adduction_l: motion_type=rotational default_value=0 range=(-2.094395 0.1745329) clamped=false
        Coordinate knee_rotation_l: motion_type=rotational default_value=0 range=(-0.349065 0.087) clamped=true
        SpatialTransform: axes_held_at_zero=translation3
          TransformAxis rotation1: coordinates=knee_angle_l axis=(0 0 1) LinearFunction(coefficients=1 0)
          TransformAxis rotation2: coordinates=knee_adduction_l axis=(1 0 0) LinearFunction(coefficients=1 0)
          TransformAxis rotation3: coordinates=knee_rotation_l axis=(0 1 0) LinearFunction(coefficients=1 0)
          TransformAxis translation1: coordinates=knee_angle_l axis=(1 0 0)
            MultiplierFunction: scale=1.085624
              SimmSpline: x=(-2.0944 -1.74533 -1.39626 -1.0472 -0.698132 -0.349066 -0.174533 0.197344 0.337395 0.490178 1.52146 2.0944)
                  y=(-0.0032 0.00179 0.00411 0.0041 0.00212 -0.001 -0.0031 -0.005227 -0.005435 -0.005574 -0.005435 -0.00525)
          TransformAxis translation2: coordinates=knee_angle_l axis=(0 1 0)
            MultiplierFunction: scale=1.085624
              SimmSpline: x=(-2.0944 -1.22173 -0.523599 -0.349066 -0.174533 0.159149 2.0944)
                  y=(-0.4226 -0.4082 -0.399 -0.3976 -0.3966 -0.395264 -0.396)
    Body medialTibia_l: mass=1e-8 mass_center=(0 0 0) inertia_xx=1e-8 inertia_yy=1e-8 inertia_zz=1e-8 meshes=Cube.vtp
      CustomJoint medialTibia_l: parent_body=origin_tibia_l location_in_parent=(0 -0.035 0.02) location=(0 -0.035 0.02)
        Coordinate medialTibiaPivotPoint_flex_l: motion_type=rotational default_value=0 range=(0 0) clamped=false
            locked=true
        Coordinate medialTibiaPivotPoint_add_l: motion_type=rotational default_value=0 range=(0 0) clamped=false
            locked=true
        Coordinate medialTibiaPivotPoint_int_l: motion_type=rotational default_value=0 range=(0 0) clamped=false
            locked=true
        SpatialTransform: axes_held_at_zero=(translation1 translation2 translation3)
          TransformAxis rotation1: coordinates=medialTibiaPivotPoint_flex_l axis=(0 0 1)
              LinearFunction(coefficients=1 0)
          TransformAxis rotation2: coordinates=medialTibiaPivotPoint_add_l axis=(1 0 0)
              LinearFunction(coefficients=1 0)
          TransformAxis rotation3: coordinates=medialTibiaPivotPoint_int_l axis=(0 1 0)
              LinearFunction(coefficients=1 0)
    Body lateralTibia_l: mass=1e-8 mass_center=(0 0 0) inertia_xx=1e-8 inertia_yy=1e-8 inertia_zz=1e-8 meshes=Cube.vtp
      CustomJoint lateralTibia_l: parent_body=medialTibia_l location_in_parent=(0 -0.035 -0.02)
          location=(0 -0.035 -0.02)
        Coordinate lateralTibiaPivotPoint_flex_l: motion_type=rotational default_value=0 range=(0 0) clamped=false
            locked=true
        Coordinate lateralTibiaPivotPoint_add_l: motion_type=rotational default_value=0 range=(0 0) clamped=false
            locked=true
        Coordinate lateralTibiaPivotPoint_int_l: motion_type=rotational default_value=0 range=(0 0) clamped=false
            locked=true
        SpatialTransform: axes_held_at_zero=(translation1 translation2 translation3)
          TransformAxis rotation1: coordinates=lateralTibiaPivotPoint_flex_l axis=(0 0 1)
              LinearFunction(coefficients=1 0)
          TransformAxis rotation2: coordinates=lateralTibiaPivotPoint_add_l axis=(1 0 0)
              LinearFunction(coefficients=1 0)
          TransformAxis rotation3: coordinates=lateralTibiaPivotPoint_int_l axis=(0 1 0)
              LinearFunction(coefficients=1 0)
    Body talus_l: mass=0.1123713 mass_center=(0 0 0) inertia_xx=0.00112371 inertia_yy=0.00112371 inertia_zz=0.00112371
        meshes=l_talus.vtp
      CustomJoint ankle_l: parent_body=origin_tibia_l location_in_parent=(0 -0.4554217 0) location=(0 0 0)
        Coordinate ankle_angle_l: motion_type=rotational default_value=0 range=(-1.047198 1.047198) clamped=true
        SpatialTransform: axes_held_at_zero=(rotation2 rotation3 translation1 translation2 translation3)
          TransformAxis rotation1: coordinates=ankle_angle_l axis=(0.1050135 0.1740224 0.9791263)
              LinearFunction(coefficients=1 0)
    Body calcn_l: mass=1.404642 mass_center=(0.116902 0.03 0) inertia_xx=0.0015732 inertia_yy=0.00438248
        inertia_zz=0.00460723 meshes=l_foot.vtp
      CustomJoint subtalar_l: parent_body=talus_l location_in_parent=(-0.05701288 -0.0444301 -0.00838823)
          location=(0 0 0)
        Coordinate subtalar_angle_l: motion_type=rotational default_value=0 range=(-1.570796 1.570796) clamped=true
        SpatialTransform: axes_held_at_zero=(rotation2 rotation3 translation1 translation2 translation3)
          TransformAxis rotation1: coordinates=subtalar_angle_l axis=(-0.7871796 -0.6047475 -0.1209495)
              LinearFunction(coefficients=1 0)
    Body toes_l: mass=0.2433964 mass_center=(0.02934 0.006 0.0175) inertia_xx=0.00011237 inertia_yy=0.00022474
        inertia_zz=0.00112371 meshes=l_bofoot.vtp
      CustomJoint mtp_l: parent_body=calcn_l location_in_parent=(0.2090199 -0.002 -0.00108) location=(0 0 0)
        Coordinate mtp_angle_l: motion_type=rotational default_value=0 range=(-1.047198 1.047198) clamped=true
            locked=true
        SpatialTransform: axes_held_at_zero=(rotation2 rotation3 translation1 translation2 translation3)
          TransformAxis rotation1: coordinates=mtp_angle_l axis=(0.5809544 0 0.8139361)
              LinearFunction(coefficients=1 0)
    Body torso: mass=23.40313 mass_center=(-0.033571 0.371647 0) inertia_xx=1.656916 inertia_yy=0.8489656
        inertia_zz=1.608484 meshes=(hat_spine.vtp hat_ribs.vtp hat_ribs_scap.vtp)
      CustomJoint back: parent_body=pelvis location_in_parent=(-0.1203756 0.08733299 0) location=(0 0 0)
        Coordinate lumbar_extension: motion_type=rotational default_value=0 range=(-1.570796 1.570796) clamped=false
        Coordinate lumbar_bending: motion_type=rotational default_value=0 range=(-1.570796 1.570796) clamped=true
        Coordinate lumbar_rotation: motion_type=rotational default_value=0 range=(-1.570796 1.570796) clamped=true
        SpatialTransform: axes_held_at_zero=(translation1 translation2 translation3)
          TransformAxis rotation1: coordinates=lumbar_extension axis=(0 0 1) LinearFunction(coefficients=1 0)
          TransformAxis rotation2: coordinates=lumbar_bending axis=(1 0 0) LinearFunction(coefficients=1 0)
          TransformAxis rotation3: coordinates=lumbar_rotation axis=(0 1 0) LinearFunction(coefficients=1 0)
      WrapEllipsoid BACK: translation=(0 0 0) quadrant=all dimensions=(0.05 0.05 0.1)
    Body head: mass=6.778802 mass_center=(0 -0.0737774 0) inertia_xx=0.00218675 inertia_yy=0.00046308
        inertia_zz=0.00150679 meshes=(jaw.vtp skull.vtp)
      CustomJoint neck: parent_body=torso location_in_parent=(0 0.5952153 0) location=(0 0 0)
        Coordinate neck_extension: motion_type=rotational default_value=0 range=(-1.570796 1.570796) clamped=true
        Coordinate neck_bending: motion_type=rotational default_value=0 range=(-1.570796 1.570796) clamped=true
        Coordinate neck_rotation: motion_type=rotational default_value=0 range=(-1.570796 1.570796) clamped=true
        SpatialTransform: axes_held_at_zero=(translation1 translation2 translation3)
          TransformAxis rotation1: coordinates=neck_extension axis=(0 0 1) LinearFunction(coefficients=1 0)
          TransformAxis rotation2: coordinates=neck_bending axis=(1 0 0) LinearFunction(coefficients=1 0)
          TransformAxis rotation3: coordinates=neck_rotation axis=(0 1 0) LinearFunction(coefficients=1 0)
    Body humerus_r: mass=2.283948 mass_center=(0 -0.179459 0) inertia_xx=0.01342388 inertia_yy=0.00463082
        inertia_zz=0.01506787 meshes=humerus_rv.vtp
      CustomJoint acromial_r: parent_body=torso location_in_parent=(-0.03978158 0.4465567 0.1992297) location=(0 0 0)
        Coordinate arm_flex_r: motion_type=rotational default_value=0 range=(-1.570796 2.792527) clamped=true
        Coordinate arm_add_r: motion_type=rotational default_value=0 range=(-3.141593 1.570796) clamped=true
        Coordinate arm_rot_r: motion_type=rotational default_value=0 range=(-1.570796 2.792527) clamped=true
        SpatialTransform: axes_held_at_zero=(translation1 translation2 translation3)
          TransformAxis rotation1: coordinates=arm_flex_r axis=(0 0 1) LinearFunction(coefficients=1 0)
          TransformAxis rotation2: coordinates=arm_add_r axis=(1 0 0) LinearFunction(coefficients=1 0)
          TransformAxis rotation3: coordinates=arm_rot_r axis=(0 1 0) LinearFunction(coefficients=1 0)
    Body ulna_r: mass=0.682656 mass_center=(0 -0.138796 0) inertia_xx=0.00332844 inertia_yy=0.00069445
        inertia_zz=0.00361049 meshes=ulna_rv.vtp
      CustomJoint elbow_r: parent_body=humerus_r location_in_parent=(0.013144 -0.3123011 -0.009595) location=(0 0 0)
        Coordinate elbow_flex_r: motion_type=rotational default_value=0 range=(0 2.618) clamped=true
        SpatialTransform: axes_held_at_zero=(rotation2 rotation3 translation1 translation2 translation3)
          TransformAxis rotation1: coordinates=elbow_flex_r axis=(0.226047 0.022269 0.9738618)
              LinearFunction(coefficients=1 0)
    Body radius_r: mass=0.682656 mass_center=(0 -0.138796 0) inertia_xx=0.00332844 inertia_yy=0.00069445
        inertia_zz=0.00361049 meshes=radius_rv.vtp
      CustomJoint radioulnar_r: parent_body=ulna_r location_in_parent=(-0.006727 -0.01497879 0.026083) location=(0 0 0)
        Coordinate pro_sup_r: motion_type=rotational default_value=1.9096 range=(-2.094395 3.141593) clamped=true
        SpatialTransform: axes_held_at_zero=(rotation2 rotation3 translation1 translation2 translation3)
          TransformAxis rotation1: coordinates=pro_sup_r axis=(0.05639803 0.9984065 0.001952)
              LinearFunction(coefficients=1 0)
    Body hand_r: mass=0.514099 mass_center=(0 -0.069972 0) inertia_xx=0.00100235 inertia_yy=0.00061467
        inertia_zz=0.00150578
        meshes=(pisiform_rvs.vtp lunate_rvs.vtp scaphoid_rvs.vtp triquetrum_rvs.vtp hamate_rvs.vtp capitate_rvs.vtp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)
      CustomJoint radius_hand_r: parent_body=radius_r location_in_parent=(-0.008797 -0.2715932 0.01361)
          location=(0 0 0)
        Coordinate wrist_flex_r: motion_type=rotational default_value=0 range=(-1.22173 1.22173) clamped=true
        Coordinate wrist_dev_r: motion_type=rotational default_value=0 range=(-0.4363323 0.6108652) clamped=true
        SpatialTransform: axes_held_at_zero=(rotation3 translation1 translation2 translation3)
          TransformAxis rotation1: coordinates=wrist_flex_r axis=(0 0 1) LinearFunction(coefficients=1 0)
          TransformAxis rotation2: coordinates=wrist_dev_r axis=(1 0 0) LinearFunction(coefficients=1 0)
    Body humerus_l: mass=2.283948 mass_center=(0 -0.179459 0) inertia_xx=0.01342388 inertia_yy=0.00463082
        inertia_zz=0.01506787 meshes=humerus_lv.vtp
      CustomJoint acromial_l: parent_body=torso location_in_parent=(-0.03978158 0.4465567 -0.1992297) location=(0 0 0)
        Coordinate arm_flex_l: motion_type=rotational default_value=0 range=(-1.570796 2.792527) clamped=true
        Coordinate arm_add_l: motion_type=rotational default_value=0 range=(-3.141593 1.570796) clamped=true
        Coordinate arm_rot_l: motion_type=rotational default_value=0 range=(-1.570796 2.792527) clamped=true
        SpatialTransform: axes_held_at_zero=(translation1 translation2 translation3)
          TransformAxis rotation1: coordinates=arm_flex_l axis=(0 0 1) LinearFunction(coefficients=1 0)
          TransformAxis rotation2: coordinates=arm_add_l axis=(-1 0 0) LinearFunction(coefficients=1 0)
          TransformAxis rotation3: coordinates=arm_rot_l axis=(0 -1 0) LinearFunction(coefficients=1 0)
    Body ulna_l: mass=0.682656 mass_center=(0 -0.138796 0) inertia_xx=0.00332844 inertia_yy=0.00069445
        inertia_zz=0.00361049 meshes=ulna_lv.vtp
      CustomJoint elbow_l: parent_body=humerus_l location_in_parent=(0.013144 -0.3123011 0.009595) location=(0 0 0)
        Coordinate elbow_flex_l: motion_type=rotational default_value=0 range=(0 2.618) clamped=true
        SpatialTransform: axes_held_at_zero=(rotation2 rotation3 translation1 translation2 translation3)
          TransformAxis rotation1: coordinates=elbow_flex_l axis=(-0.226047 -0.022269 0.9738618)
              LinearFunction(coefficients=1 0)
    Body radius_l: mass=0.682656 mass_center=(0 -0.138796 0) inertia_xx=0.00332844 inertia_yy=0.00069445
        inertia_zz=0.00361049 meshes=radius_lv.vtp
      CustomJoint radioulnar_l: parent_body=ulna_l location_in_parent=(-0.006727 -0.01497879 -0.026083)
          location=(0 0 0)
        Coordinate pro_sup_l: motion_type=rotational default_value=1.9096 range=(-2.094395 3.141593) clamped=true
        SpatialTransform: axes_held_at_zero=(rotation2 rotation3 translation1 translation2 translation3)
          TransformAxis rotation1: coordinates=pro_sup_l axis=(-0.05639803 -0.9984065 0.001952)
              LinearFunction(coefficients=1 0)
    Body hand_l: mass=0.514099 mass_center=(0 -0.069972 0) inertia_xx=0.00100235 inertia_yy=0.00061467
        inertia_zz=0.00150578
        meshes=(pisiform_lvs.vtp lunate_lvs.vtp scaphoid_lvs.vtp triquetrum_lvs.vtp hamate_lvs.vtp capitate_lvs.vtp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)
      CustomJoint radius_hand_l: parent_body=radius_l location_in_parent=(-0.008797 -0.2715932 -0.01361)
          location=(0 0 0)
        Coordinate wrist_flex_l: motion_type=rotational default_value=0 range=(-1.22173 1.22173) clamped=true
        Coordinate wrist_dev_l: motion_type=rotational default_value=0 range=(-0.4363323 0.6108652) clamped=true
        SpatialTransform: axes_held_at_zero=(rotation3 translation1 translation2 translation3)
          TransformAxis rotation1: coordinates=wrist_flex_l axis=(0 0 1) LinearFunction(coefficients=1 0)
          TransformAxis rotation2: coordinates=wrist_dev_l axis=(-1 0 0) LinearFunction(coefficients=1 0)
  ForceSet:
    Thelen2003Muscle glut_med1_r: min_control=0 max_control=1 optimal_force=1 max_isometric_force=819
        optimal_fiber_length=0.05776959 tendon_slack_length=0.08422482 pennation_angle_at_optimal=0.1396263
        max_contraction_velocity=10 activation_time_constant=0.01 deactivation_time_constant=0.04
        FmaxTendonStrain=0.033 FmaxMuscleStrain=0.6 KshapeActive=0.5 KshapePassive=4 Af=0.3 Flen=1.8
      PathPoint P1: pelvis (-0.0487718 0.0325757 0.148926)
      PathPoint P2: femur_r (-0.0234668 -0.0125946 0.0597434)
    Thelen2003Muscle glut_med2_r: min_control=0 max_control=1 optimal_force=1 max_isometric_force=573
        optimal_fiber_length=0.09088075 tendon_slack_length=0.05700213 pennation_angle_at_optimal=0
        max_contraction_velocity=10 activation_time_constant=0.01 deactivation_time_constant=0.04
        FmaxTendonStrain=0.033 FmaxMuscleStrain=0.6 KshapeActive=0.5 KshapePassive=4 Af=0.3 Flen=1.8
      PathPoint P1: pelvis (-0.102206 0.0476849 0.0943565)
      PathPoint P2: femur_r (-0.0277726 -0.00624346 0.0567294)
    Thelen2003Muscle glut_med3_r: min_control=0 max_control=1 optimal_force=1 max_isometric_force=653
        optimal_fiber_length=0.07125497 tendon_slack_length=0.05845996 pennation_angle_at_optimal=0.3316126
        max_contraction_velocity=10 activation_time_constant=0.01 deactivation_time_constant=0.04
        FmaxTendonStrain=0.033 FmaxMuscleStrain=0.6 KshapeActive=0.5 KshapePassive=4 Af=0.3 Flen=1.8
      PathPoint P1: pelvis (-0.146196 0.0112515 0.0798212)
      PathPoint P2: femur_r (-0.0332626 -0.00505936 0.0557606)
    Thelen2003Muscle glut_min1_r: min_control=0 max_control=1 optimal_force=1 max_isometric_force=270
        optimal_fiber_length=0.07282415 tendon_slack_length=0.01713509 pennation_angle_at_optimal=0.1745329
        max_contraction_velocity=10 activation_time_constant=0.01 deactivation_time_constant=0.04
        FmaxTendonStrain=0.033 FmaxMuscleStrain=0.6 KshapeActive=0.5 KshapePassive=4 Af=0.3 Flen=1.8
      PathPoint P1: pelvis (-0.0558246 -0.00857256 0.130079)
      PathPoint P2: femur_r (-0.00775051 -0.0111952 0.0602817)
    Thelen2003Muscle glut_min2_r: min_control=0 max_control=1 optimal_force=1 max_isometric_force=285
        optimal_fiber_length=0.05945327 tendon_slack_length=0.0276033 pennation_angle_at_optimal=0
        max_contraction_velocity=10 activation_time_constant=0.01 deactivation_time_constant=0.04
        FmaxTendonStrain=0.033 FmaxMuscleStrain=0.6 KshapeActive=0.5 KshapePassive=4 Af=0.3 Flen=1.8
      PathPoint P1: pelvis (-0.0756681 -0.0069652 0.122072)
      PathPoint P2: femur_r (-0.010334 -0.0111952 0.0602817)
    Thelen2003Muscle glut_min3_r: min_control=0 max_control=1 optimal_force=1 max_isometric_force=323
        optimal_fiber_length=0.04071477 tendon_slack_length=0.05464351 pennation_angle_at_optimal=0.01745329
        max_contraction_velocity=10 activation_time_constant=0.01 deactivation_time_constant=0.04
        FmaxTendonStrain=0.033 FmaxMuscleStrain=0.6 KshapeActive=0.5 KshapePassive=4 Af=0.3 Flen=1.8
      PathPoint P1: pelvis (-0.0996954 -0.00675089 0.105443)
      PathPoint P2: femur_r (-0.0145322 -0.0089346 0.0592052)
    Thelen2003Muscle semimem_r: min_control=0 max_control=1 optimal_force=1 max_isometric_force=1288
        optimal_fiber_length=0.08606328 tendon_slack_length=0.386209 pennation_angle_at_optimal=0.2617994
        max_contraction_velocity=10 activation_time_constant=0.01 deactivation_time_constant=0.04
        FmaxTendonStrain=0.033 FmaxMuscleStrain=0.6 KshapeActive=0.5 KshapePassive=4 Af=0.3 Flen=1.8
      PathPoint P1: pelvis (-0.14249 -0.104446 0.0880866)
      ConditionalPathPoint P2: origin_tibia_r (-0.0370528 -0.037468 -0.0201341) range=(-0.558505 0.174533)
          coordinate=knee_angle_r
      PathPoint P3: origin_tibia_r (-0.0287478 -0.0507985 -0.0208369)
    Thelen2003Muscle semiten_r: min_control=0 max_control=1 optimal_force=1 max_isometric_force=410
        optimal_fiber_length=0.216006 tendon_slack_length=0.2745748 pennation_angle_at_optimal=0.08726646
        max_contraction_velocity=10 activation_time_constant=0.01 deactivation_time_constant=0.04
        FmaxTendonStrain=0.033 FmaxMuscleStrain=0.6 KshapeActive=0.5 KshapePassive=4 Af=0.3 Flen=1.8
      PathPoint P1: pelvis (-0.151037 -0.117744 0.0743889)
      ConditionalPathPoint P2: origin_tibia_r (-0.0447508 -0.0304408 -0.024244) range=(-0.331613 0.174533)
          coordinate=knee_angle_r
      PathPoint P3: origin_tibia_r (-0.0353705 -0.0562393 -0.0243611)
      PathPoint P4: origin_tibia_r (-0.0120315 -0.0794292 -0.026086)
      PathPoint P5: origin_tibia_r (0.00287478 -0.101789 -0.0205494)
    Thelen2003Muscle bicfemlh_r: min_control=0 max_control=1 optimal_force=1 max_isometric_force=896
        optimal_fiber_length=0.1173653 tendon_slack_length=0.3510192 pennation_angle_at_optimal=0
        max_contraction_velocity=10 activation_time_constant=0.01 deactivation_time_constant=0.04
        FmaxTendonStrain=0.033 FmaxMuscleStrain=0.2 KshapeActive=0.5 KshapePassive=4 Af=0.3 Flen=1.8
      PathPoint P1: pelvis (-0.150571 -0.109911 0.0855367)
      PathPoint P2: origin_tibia_r (-0.0320485 -0.0383305 0.0313351)
      PathPoint P3: origin_tibia_r (-0.0249148 -0.0599446 0.0365204)
    Thelen2003Muscle bifemsh_r: min_control=0 max_control=1 optimal_force=1 max_isometric_force=804
        optimal_fiber_length=0.185705 tendon_slack_length=0.0955361 pennation_angle_at_optimal=0.4014257
        max_contraction_velocity=10 activation_time_constant=0.01 deactivation_time_constant=0.04
        FmaxTendonStrain=0.033 FmaxMuscleStrain=0.2 KshapeActive=0.5 KshapePassive=4 Af=0.3 Flen=1.8
      PathPoint P1: femur_r (0.0053823 -0.22724 0.0251891)
      PathPoint P2: origin_tibia_r (-0.0320485 -0.0383305 0.0313351)
      PathPoint P3: origin_tibia_r (-0.0249148 -0.0599446 0.0365204)
    Thelen2003Muscle sar_r: min_control=0 max_control=1 optimal_force=1 max_isometric_force=156
        optimal_fiber_length=0.5604475 tendon_slack_length=0.1077784 pennation_angle_at_optimal=0
        max_contraction_velocity=10 activation_time_constant=0.01 deactivation_time_constant=0.04
        FmaxTendonStrain=0.033 FmaxMuscleStrain=0.6 KshapeActive=0.5 KshapePassive=4 Af=0.3 Flen=1.8
      PathPoint P1: pelvis (-0.0182894 -0.00139304 0.152991)
      PathPoint P2: femur_r (-0.00322938 -0.38408 -0.0453189)
      PathPoint P3: origin_tibia_r (-0.00596252 -0.0446124 -0.0424829)
      PathPoint P4: origin_tibia_r (0.00638841 -0.0627129 -0.0407793)
      PathPoint P5: origin_tibia_r (0.0258731 -0.0894377 -0.0268313)
    Thelen2003Muscle add_long_r: min_control=0 max_control=10 optimal_force=10 max_isometric_force=627
        optimal_fiber_length=0.1519548 tendon_slack_length=0.1211234 pennation_angle_at_optimal=0.1047198
        max_contraction_velocity=10 activation_time_constant=0.01 deactivation_time_constant=0.04
        FmaxTendonStrain=0.033 FmaxMuscleStrain=0.6 KshapeActive=0.5 KshapePassive=4 Af=0.3 Flen=1.8
      PathPoint P1: pelvis (-0.0377743 -0.0895833 0.0208176)
      PathPoint P2: femur_r (0.0053823 -0.22724 0.0251891)
    Thelen2003Muscle add_brev_r: min_control=0 max_control=1 optimal_force=1 max_isometric_force=429
        optimal_fiber_length=0.1508439 tendon_slack_length=0.0226833 pennation_angle_at_optimal=0
        max_contraction_velocity=10 activation_time_constant=0.01 deactivation_time_constant=0.04
        FmaxTendonStrain=0.033 FmaxMuscleStrain=0.6 KshapeActive=0.5 KshapePassive=4 Af=0.3 Flen=1.8
      PathPoint P1: pelvis (-0.0701693 -0.0980487 0.0202017)
      PathPoint P2: femur_r (0.00096882 -0.128744 0.0316479)
    Thelen2003Muscle add_mag1_r: min_control=0 max_control=1 optimal_force=1 max_isometric_force=381
        optimal_fiber_length=0.09924949 tendon_slack_length=0.06844792 pennation_angle_at_optimal=0.08726646
        max_contraction_velocity=10 activation_time_constant=0.01 deactivation_time_constant=0.04
        FmaxTendonStrain=0.033 FmaxMuscleStrain=0.6 KshapeActive=0.5 KshapePassive=4 Af=0.3 Flen=1.8
      PathPoint P1: pelvis (-0.0875024 -0.125802 0.0314111)
      PathPoint P2: femur_r (-0.00484406 -0.130359 0.0364919)
    Thelen2003Muscle add_mag2_r: min_control=0 max_control=1 optimal_force=1 max_isometric_force=343
        optimal_fiber_length=0.1326038 tendon_slack_length=0.1315079 pennation_angle_at_optimal=0.05235988
        max_contraction_velocity=10 activation_time_constant=0.01 deactivation_time_constant=0.04
        FmaxTendonStrain=0.033 FmaxMuscleStrain=0.6 KshapeActive=0.5 KshapePassive=4 Af=0.3 Flen=1.8
      PathPoint P1: pelvis (-0.0993368 -0.127731 0.0379397)
      PathPoint P2: femur_r (0.00581287 -0.245971 0.0244356)
    Thelen2003Muscle add_mag3_r: min_control=0 max_control=1 optimal_force=1 max_isometric_force=488
        optimal_fiber_length=0.1414416 tendon_slack_length=0.268847 pennation_angle_at_optimal=0.08726646
        max_contraction_velocity=10 activation_time_constant=0.01 deactivation_time_constant=0.04
        FmaxTendonStrain=0.033 FmaxMuscleStrain=0.6 KshapeActive=0.5 KshapePassive=4 Af=0.3 Flen=1.8
      PathPoint P1: pelvis (-0.132784 -0.122298 0.0601369)
      PathPoint P2: femur_r (0.00753521 -0.413037 -0.0286338)
    Thelen2003Muscle tfl_r: min_control=0 max_control=1 optimal_force=1 max_isometric_force=233
        optimal_fiber_length=0.1020582 tendon_slack_length=0.4565762 pennation_angle_at_optimal=0.05235988
        max_contraction_velocity=10 activation_time_constant=0.01 deactivation_time_constant=0.04
        FmaxTendonStrain=0.033 FmaxMuscleStrain=0.6 KshapeActive=0.5 KshapePassive=4 Af=0.3 Flen=1.8
      PathPoint P1: pelvis (-0.0371766 0.0229316 0.152867)
      PathPoint P2: femur_r (0.0316479 -0.107108 0.0642646)
      PathPoint P3: femur_r (0.00581287 -0.435858 0.0384296)
      PathPoint P4: origin_tibia_r (0.00638841 -0.0518526 0.0316226)
    Thelen2003Muscle pect_r: min_control=0 max_control=1 optimal_force=1 max_isometric_force=266
        optimal_fiber_length=0.112519 tendon_slack_length=0.03713126 pennation_angle_at_optimal=0
        max_contraction_velocity=10 activation_time_constant=0.01 deactivation_time_constant=0.04
        FmaxTendonStrain=0.033 FmaxMuscleStrain=0.6 KshapeActive=0.5 KshapePassive=4 Af=0.3 Flen=1.8
      PathPoint P1: pelvis (-0.0515212 -0.0822966 0.0555545)
      PathPoint P2: femur_r (-0.0131328 -0.0884849 0.0272344)
    Thelen2003Muscle grac_r: min_control=0 max_control=1 optimal_force=1 max_isometric_force=162
        optimal_fiber_length=0.3786046 tendon_slack_length=0.1355232 pennation_angle_at_optimal=0.05235988
        max_contraction_velocity=10 activation_time_constant=0.01 deactivation_time_constant=0.04
        FmaxTendonStrain=0.033 FmaxMuscleStrain=0.6 KshapeActive=0.5 KshapePassive=4 Af=0.3 Flen=1.8
      PathPoint P1: pelvis (-0.0884707 -0.127195 0.0344167)
      ConditionalPathPoint P2: origin_tibia_r (-0.02829 -0.033965 -0.0401831) range=(-0.436332 0.174533)
          coordinate=knee_angle_r
      PathPoint P3: origin_tibia_r (-0.0206878 -0.0548658 -0.0381175)
      PathPoint P4: origin_tibia_r (0.00638841 -0.0890118 -0.024276)
    Thelen2003Muscle glut_max1_r: min_control=0 max_control=1 optimal_force=1 max_isometric_force=573
        optimal_fiber_length=0.1538145 tendon_slack_length=0.1354001 pennation_angle_at_optimal=0.08726646
        max_contraction_velocity=10 activation_time_constant=0.01 deactivation_time_constant=0.04
        FmaxTendonStrain=0.033 FmaxMuscleStrain=0.2 KshapeActive=0.5 KshapePassive=4 Af=0.3 Flen=1.8
      PathPoint P1: pelvis (-0.142849 0.0655801 0.0862266)
      PathPoint P2: pelvis (-0.154325 0.00128588 0.109138)
      PathPoint P3: femur_r (-0.0491941 -0.0266962 0.0421972)
      PathPoint P4: femur_r (-0.0298179 -0.0609275 0.0505936)
    Thelen2003Muscle glut_max2_r: min_control=0 max_control=1 optimal_force=1 max_isometric_force=819
        optimal_fiber_length=0.1616439 tendon_slack_length=0.1396516 pennation_angle_at_optimal=0
        max_contraction_velocity=10 activation_time_constant=0.01 deactivation_time_constant=0.04
        FmaxTendonStrain=0.033 FmaxMuscleStrain=0.2 KshapeActive=0.5 KshapePassive=4 Af=0.3 Flen=1.8
      PathPoint P1: pelvis (-0.161258 0.0188596 0.0693508)
      PathPoint P2: pelvis (-0.164485 -0.0557217 0.112587)
      PathPoint P3: femur_r (-0.0458571 -0.0570523 0.0315402)
      PathPoint P4: femur_r (-0.0167928 -0.109368 0.0451036)
    Thelen2003Muscle glut_max3_r: min_control=0 max_control=1 optimal_force=1 max_isometric_force=552
        optimal_fiber_length=0.1619441 tendon_slack_length=0.1630687 pennation_angle_at_optimal=0.08726646
        max_contraction_velocity=10 activation_time_constant=0.01 deactivation_time_constant=0.04
        FmaxTendonStrain=0.033 FmaxMuscleStrain=0.2 KshapeActive=0.5 KshapePassive=4 Af=0.3 Flen=1.8
      PathPoint P1: pelvis (-0.186002 -0.0336473 0.00714448)
      PathPoint P2: pelvis (-0.182775 -0.112729 0.0496419)
      PathPoint P3: femur_r (-0.0321861 -0.112059 0.0145322)
      PathPoint P4: femur_r (-0.00645875 -0.152749 0.0442425)
    Thelen2003Muscle iliacus_r: min_control=0 max_control=1 optimal_force=1 max_isometric_force=1073
        optimal_fiber_length=0.1102439 tendon_slack_length=0.1102439 pennation_angle_at_optimal=0.1221731
        max_contraction_velocity=10 activation_time_constant=0.01 deactivation_time_constant=0.04
        FmaxTendonStrain=0.033 FmaxMuscleStrain=0.6 KshapeActive=0.5 KshapePassive=4 Af=0.3 Flen=1.8
      PathPoint P1: pelvis (-0.0805692 0.0391123 0.105196)
      PathPoint P2: pelvis (-0.030841 -0.0589364 0.0998996)
      ConditionalPathPoint P3: pelvis (-0.0344272 -0.0862614 0.100516) range=(-1.5708 0.785398)
          coordinate=hip_flexion_r
      PathPoint P4: femur_r (0.00182998 -0.0584517 0.00613581)
      PathPoint P5: femur_r (-0.0207757 -0.0668481 0.0138863)
    Thelen2003Muscle psoas_r: min_control=0 max_control=1 optimal_force=1 max_isometric_force=1113
        optimal_fiber_length=0.1103475 tendon_slack_length=0.1765561 pennation_angle_at_optimal=0.1396263
        max_contraction_velocity=10 activation_time_constant=0.01 deactivation_time_constant=0.04
        FmaxTendonStrain=0.033 FmaxMuscleStrain=0.6 KshapeActive=0.5 KshapePassive=4 Af=0.3 Flen=1.8
      PathPoint P1: pelvis (-0.0773416 0.0950483 0.0355993)
      PathPoint P2: pelvis (-0.0284503 -0.0610795 0.0934942)
      ConditionalPathPoint P3: pelvis (-0.0344272 -0.0862614 0.100516) range=(-1.5708 0.785398)
          coordinate=hip_flexion_r
      PathPoint P4: femur_r (0.00172233 -0.0545764 0.00409054)
      PathPoint P5: femur_r (-0.0202374 -0.0642646 0.0111952)
    Thelen2003Muscle quad_fem_r: min_control=0 max_control=1 optimal_force=1 max_isometric_force=381
        optimal_fiber_length=0.06224823 tendon_slack_length=0.02766588 pennation_angle_at_optimal=0
        max_contraction_velocity=10 activation_time_constant=0.01 deactivation_time_constant=0.04
        FmaxTendonStrain=0.033 FmaxMuscleStrain=0.6 KshapeActive=0.5 KshapePassive=4 Af=0.3 Flen=1.8
      PathPoint P1: pelvis (-0.136633 -0.123338 0.064054)
      PathPoint P2: femur_r (-0.0410131 -0.0386449 0.0393984)
    Thelen2003Muscle gem_r: min_control=0 max_control=1 optimal_force=1 max_isometric_force=164
        optimal_fiber_length=0.02731216 tendon_slack_length=0.04438225 pennation_angle_at_optimal=0
        max_contraction_velocity=10 activation_time_constant=0.01 deactivation_time_constant=0.04
        FmaxTendonStrain=0.033 FmaxMuscleStrain=0.6 KshapeActive=0.5 KshapePassive=4 Af=0.3 Flen=1.8
      PathPoint P1: pelvis (-0.135438 -0.0878688 0.0879511)
      PathPoint P2: femur_r (-0.0152857 -0.00355231 0.0476871)
    Thelen2003Muscle peri_r: min_control=0 max_control=1 optimal_force=1 max_isometric_force=444
        optimal_fiber_length=0.02999019 tendon_slack_length=0.1326489 pennation_angle_at_optimal=0.1745329
        max_contraction_velocity=10 activation_time_constant=0.01 deactivation_time_constant=0.04
        FmaxTendonStrain=0.033 FmaxMuscleStrain=0.6 KshapeActive=0.5 KshapePassive=4 Af=0.3 Flen=1.8
      PathPoint P1: pelvis (-0.166876 0.00032147 0.0289475)
      PathPoint P2: pelvis (-0.14261 -0.0295753 0.0809298)
      PathPoint P3: femur_r (-0.0159316 -0.00387525 0.0470412)
    Thelen2003Muscle recfem_r: min_control=0 max_control=1 optimal_force=1 max_isometric_force=1169
        optimal_fiber_length=0.122704 tendon_slack_length=0.3336688 pennation_angle_at_optimal=0.08726646
        max_contraction_velocity=10 activation_time_constant=0.01 deactivation_time_constant=0.04
        FmaxTendonStrain=0.033 FmaxMuscleStrain=0.2 KshapeActive=0.5 KshapePassive=4 Af=0.3 Flen=1.8
      PathPoint P1: pelvis (-0.035264 -0.0333258 0.119239)
      ConditionalPathPoint P2: femur_r (0.0359537 -0.433813 0.00204527) range=(-2.61799 -1.45997)
          coordinate=knee_angle_r
      MovingPathPoint P3: origin_tibia_r (0.0657555 0.0223424 0.00149063) x_coordinate=knee_angle_r
          y_coordinate=knee_angle_r z_coordinate=knee_angle_r
        x_location: MultiplierFunction: scale=1.064735
          SimmSpline: x=(-2.0944 -1.99997 -1.5708 -1.45752 -1.39626 -1.0472 -0.698132 -0.526391 -0.349066 -0.174533 0 0.00017453 0.00034907 0.0279253 0.0872665 0.174533 2.0944)
              y=(0.0155805 0.0179938 0.0275081 0.0296564 0.0307615 0.0365695 0.0422074 0.0450902 0.048391 0.0534299 0.0617576 0.0617669 0.0617762 0.0633083 0.066994 0.0733035 0.0573481)
        y_location: MultiplierFunction: scale=1.064735
          SimmSpline: x=(-2.0944 -1.99997 -1.5708 -1.45752 -1.39626 -1.0472 -0.698132 -0.526391 -0.349066 -0.174533 0 0.00017453 0.00034907 0.0279253 0.0872665 0.174533 2.0944)
              y=(0.0234116 0.0237613 0.0251141 0.0252795 0.0253146 0.0249184 0.0242373 0.0238447 0.0234197 0.0227644 0.020984 0.0209814 0.0209788 0.0205225 0.0191754 0.0159554 -0.0673774)
        z_location: MultiplierFunction: scale=1.064735
          SimmSpline: x=(-2.0944 0.1745) y=(0.0014 0.0014)
    Thelen2003Muscle vasmed_r: min_control=0 max_control=1 optimal_force=1 max_isometric_force=1294
        optimal_fiber_length=0.09586701 tendon_slack_length=0.1357218 pennation_angle_at_optimal=0.08726646
        max_contraction_velocity=10 activation_time_constant=0.01 deactivation_time_constant=0.04
        FmaxTendonStrain=0.033 FmaxMuscleStrain=0.2 KshapeActive=0.5 KshapePassive=4 Af=0.3 Flen=1.8
      PathPoint P1: femur_r (0.0150704 -0.225949 0.0202374)
      PathPoint P2: femur_r (0.0383219 -0.298071 0.00096882)
      ConditionalPathPoint P3: femur_r (0.039829 -0.43575 -0.0134557) range=(-2.61799 -1.21004) coordinate=knee_angle_r
      ConditionalPathPoint P4: femur_r (0.029495 -0.458033 -0.0141016) range=(-2.61799 -1.78006)
          coordinate=knee_angle_r
      MovingPathPoint P5: origin_tibia_r (0.0595811 0.0232024 -0.0155451) x_coordinate=knee_angle_r
          y_coordinate=knee_angle_r z_coordinate=knee_angle_r
        x_location: MultiplierFunction: scale=1.064735
          SimmSpline: x=(-2.0944 -1.99997 -1.5708 -1.45752 -1.39626 -1.0472 -0.698132 -0.526391 -0.349066 -0.174533 0 0.00017453 0.00034907 0.0279253 0.0872665 0.174533 2.0944)
              y=(0.00981097 0.0122243 0.0217371 0.0238851 0.0249902 0.0307959 0.0364187 0.0392871 0.0425654 0.0475764 0.0559586 0.0559681 0.0559776 0.0575419 0.0613368 0.0679503 0.0629332)
        y_location: MultiplierFunction: scale=1.064735
          SimmSpline: x=(-2.0944 -1.99997 -1.5708 -1.45752 -1.39626 -1.0472 -0.698132 -0.526391 -0.349066 -0.174533 0 0.00017453 0.00034907 0.0279253 0.0872665 0.174533 2.0944)
              y=(0.0224154 0.0227651 0.0241265 0.0242933 0.0243287 0.0239462 0.0233593 0.0230677 0.0228342 0.0226362 0.0217917 0.0217903 0.0217889 0.0215365 0.0206842 0.0183269 -0.0656205)
        z_location: MultiplierFunction: scale=1.064735
          SimmSpline: x=(-2.0944 2.0944) y=(-0.0146 -0.0146)
    Thelen2003Muscle vas_int_r: min_control=0 max_control=1 optimal_force=1 max_isometric_force=1365
        optimal_fiber_length=0.09376034 tendon_slack_length=0.1465679 pennation_angle_at_optimal=0.05235988
        max_contraction_velocity=10 activation_time_constant=0.01 deactivation_time_constant=0.04
        FmaxTendonStrain=0.033 FmaxMuscleStrain=0.2 KshapeActive=0.5 KshapePassive=4 Af=0.3 Flen=1.8
      PathPoint P1: femur_r (0.0312173 -0.207111 0.0333702)
      PathPoint P2: femur_r (0.0360614 -0.224334 0.0306791)
      ConditionalPathPoint P3: femur_r (0.0369225 -0.433813 0.00592052) range=(-2.61799 -1.42) coordinate=knee_angle_r
      MovingPathPoint P4: origin_tibia_r (0.0590536 0.0269296 0.00191652) x_coordinate=knee_angle_r
          y_coordinate=knee_angle_r z_coordinate=knee_angle_r
        x_location: MultiplierFunction: scale=1.064735
          SimmSpline: x=(-2.0944 -1.99997 -1.5708 -1.45752 -1.39626 -1.0472 -0.698132 -0.526391 -0.349066 -0.174533 0 0.00017453 0.00034907 0.0279253 0.0872665 0.174533 2.0944)
              y=(0.0082733 0.0106866 0.0202042 0.022353 0.0234583 0.0292715 0.0349465 0.037871 0.0412569 0.0465287 0.0554632 0.0554735 0.0554837 0.0571717 0.061272 0.0684368 0.0648818)
        y_location: MultiplierFunction: scale=1.064735
          SimmSpline: x=(-2.0944 -1.99997 -1.5708 -1.45752 -1.39626 -1.0472 -0.698132 -0.526391 -0.349066 -0.174533 0 0.00017453 0.00034907 0.0279253 0.0872665 0.174533 2.0944)
              y=(0.025599 0.0259487 0.0273124 0.0274796 0.0275151 0.0271363 0.0265737 0.0263073 0.0261187 0.0260129 0.0252923 0.0252911 0.0252898 0.0250526 0.0242191 0.0218288 -0.0685706)
        z_location: MultiplierFunction: scale=1.064735
          SimmSpline: x=(-2.0944 2.0944) y=(0.0018 0.0018)
    Thelen2003Muscle vaslat_r: min_control=0 max_control=1 optimal_force=1 max_isometric_force=1871
        optimal_fiber_length=0.0904628 tendon_slack_length=0.1690793 pennation_angle_at_optimal=0.08726646
        max_contraction_velocity=10 activation_time_constant=0.01 deactivation_time_constant=0.04
        FmaxTendonStrain=0.033 FmaxMuscleStrain=0.2 KshapeActive=0.5 KshapePassive=4 Af=0.3 Flen=1.8
      PathPoint P1: femur_r (0.005167 -0.199575 0.0375684)
      PathPoint P2: femur_r (0.0289567 -0.27891 0.0440272)
      ConditionalPathPoint P3: femur_r (0.0388602 -0.433813 0.0220674) range=(-2.61799 -1.21004)
          coordinate=knee_angle_r
      ConditionalPathPoint P4: femur_r (0.0272344 -0.456741 0.0198068) range=(-2.61799 -1.92004)
          coordinate=knee_angle_r
      MovingPathPoint P5: origin_tibia_r (0.0638369 0.0208543 0.0175681) x_coordinate=knee_angle_r
          y_coordinate=knee_angle_r z_coordinate=knee_angle_r
        x_location: MultiplierFunction: scale=1.064735
          SimmSpline: x=(-2.0944 -1.99997 -1.5708 -1.45752 -1.39626 -1.0472 -0.698132 -0.526391 -0.349066 -0.174533 0 0.00017453 0.00034907 0.0279253 0.0872665 0.174533 2.0944)
              y=(0.0142897 0.016703 0.0262145 0.0283623 0.0294674 0.0352709 0.0408785 0.0437291 0.0469704 0.0518742 0.0599557 0.0599647 0.0599738 0.0614577 0.0650351 0.0711867 0.0583766)
        y_location: MultiplierFunction: scale=1.064735
          SimmSpline: x=(-2.0944 -1.99997 -1.5708 -1.45752 -1.39626 -1.0472 -0.698132 -0.526391 -0.349066 -0.174533 0 0.00017453 0.00034907 0.0279253 0.0872665 0.174533 2.0944)
              y=(0.0215318 0.0218815 0.0232362 0.0234019 0.0234371 0.0230439 0.0223842 0.0220151 0.0216359 0.0210971 0.0195864 0.0195842 0.019582 0.01919 0.018008 0.0151073 -0.0653421)
        z_location: MultiplierFunction: scale=1.064735
          SimmSpline: x=(-2.0944 2.0944) y=(0.0165 0.0165)
    Thelen2003Muscle gasmed_r: min_control=0 max_control=1 optimal_force=1 max_isometric_force=1558
        optimal_fiber_length=0.06420767 tendon_slack_length=0.4173499 pennation_angle_at_optimal=0.296706
        max_contraction_velocity=10 activation_time_constant=0.01 deactivation_time_constant=0.04
        FmaxTendonStrain=0.033 FmaxMuscleStrain=0.6 KshapeActive=0.5 KshapePassive=4 Af=0.3 Flen=1.8
      PathPoint P1: femur_r (-0.0204527 -0.422941 -0.0252968)
      ConditionalPathPoint P2: femur_r (-0.0322938 -0.432952 -0.0277726) range=(-0.785398 0.174533)
          coordinate=knee_angle_r
      PathPoint P3: calcn_r (0 0.031 -0.0053)
    Thelen2003Muscle gaslat_r: min_control=0 max_control=1 optimal_force=1 max_isometric_force=683
        optimal_fiber_length=0.06847914 tendon_slack_length=0.4065949 pennation_angle_at_optimal=0.1396263
        max_contraction_velocity=10 activation_time_constant=0.01 deactivation_time_constant=0.04
        FmaxTendonStrain=0.033 FmaxMuscleStrain=0.6 KshapeActive=0.5 KshapePassive=4 Af=0.3 Flen=1.8
      PathPoint P1: femur_r (-0.0236821 -0.424771 0.0292797)
      ConditionalPathPoint P2: femur_r (-0.0322938 -0.432521 0.029495) range=(-0.785398 0.174533)
          coordinate=knee_angle_r
      PathPoint P3: calcn_r (0 0.031 -0.0053)
    Thelen2003Muscle sol_r: min_control=0 max_control=1 optimal_force=1 max_isometric_force=3549
        optimal_fiber_length=0.05372696 tendon_slack_length=0.2686348 pennation_angle_at_optimal=0.4363323
        max_contraction_velocity=10 activation_time_constant=0.01 deactivation_time_constant=0.04
        FmaxTendonStrain=0.033 FmaxMuscleStrain=0.6 KshapeActive=0.5 KshapePassive=4 Af=0.3 Flen=1.8
      PathPoint P1: origin_tibia_r (-0.00255536 -0.163224 0.00755962)
      PathPoint P2: calcn_r (0 0.031 -0.0053)
    Thelen2003Muscle tib_post_r: min_control=0 max_control=1 optimal_force=1 max_isometric_force=1588
        optimal_fiber_length=0.03346977 tendon_slack_length=0.3346977 pennation_angle_at_optimal=0.2094395
        max_contraction_velocity=10 activation_time_constant=0.01 deactivation_time_constant=0.04
        FmaxTendonStrain=0.033 FmaxMuscleStrain=0.6 KshapeActive=0.5 KshapePassive=4 Af=0.3 Flen=1.8
      PathPoint P1: origin_tibia_r (-0.0100085 -0.143526 0.00202299)
      PathPoint P2: origin_tibia_r (-0.0153322 -0.431324 -0.0243824)
      PathPoint P3: calcn_r (0.0489268 0.0334 -0.0286)
      PathPoint P4: calcn_r (0.0905791 0.0159 -0.0281)
    Thelen2003Muscle flex_dig_r: min_control=0 max_control=1 optimal_force=1 max_isometric_force=310
        optimal_fiber_length=0.03652936 tendon_slack_length=0.4297573 pennation_angle_at_optimal=0.1221731
        max_contraction_velocity=10 activation_time_constant=0.01 deactivation_time_constant=0.04
        FmaxTendonStrain=0.033 FmaxMuscleStrain=0.6 KshapeActive=0.5 KshapePassive=4 Af=0.3 Flen=1.8
      PathPoint P1: origin_tibia_r (-0.0088373 -0.217845 -0.00191653)
      PathPoint P2: origin_tibia_r (-0.0163969 -0.431324 -0.0208688)
      PathPoint P3: calcn_r (0.0511561 0.0315 -0.028)
      PathPoint P4: calcn_r (0.08307 0.0176 -0.0263)
      PathPoint P5: calcn_r (0.194534 -0.0081 0.0116)
      PathPoint P6: toes_r (-0.00161574 -0.0078 0.0147)
      PathPoint P7: toes_r (0.0242362 -0.0071 0.0215)
      PathPoint P8: toes_r (0.0375023 -0.006 0.0242)
    Thelen2003Muscle flex_hal_r: min_control=0 max_control=1 optimal_force=1 max_isometric_force=322
        optimal_fiber_length=0.04620801 tendon_slack_length=0.4083498 pennation_angle_at_optimal=0.1745329
        max_contraction_velocity=10 activation_time_constant=0.01 deactivation_time_constant=0.04
        FmaxTendonStrain=0.033 FmaxMuscleStrain=0.6 KshapeActive=0.5 KshapePassive=4 Af=0.3 Flen=1.8
      PathPoint P1: origin_tibia_r (-0.00841141 -0.248509 0.0259795)
      PathPoint P2: origin_tibia_r (-0.0198041 -0.434305 -0.0185264)
      PathPoint P3: calcn_r (0.0438816 0.0276 -0.0241)
      PathPoint P4: calcn_r (0.121789 0.0068 -0.0256)
      PathPoint P5: calcn_r (0.202512 -0.0053 -0.0269)
      PathPoint P6: toes_r (0.0131811 -0.0064 -0.0265)
      PathPoint P7: toes_r (0.047792 -0.0102 -0.0181)
    Thelen2003Muscle tib_ant_r: min_control=0 max_control=1 optimal_force=1 max_isometric_force=905
        optimal_fiber_length=0.1059039 tendon_slack_length=0.2409854 pennation_angle_at_optimal=0.08726646
        max_contraction_velocity=10 activation_time_constant=0.01 deactivation_time_constant=0.04
        FmaxTendonStrain=0.033 FmaxMuscleStrain=0.6 KshapeActive=0.5 KshapePassive=4 Af=0.3 Flen=1.8
      PathPoint P1: origin_tibia_r (0.0190588 -0.172913 0.0122445)
      PathPoint P2: origin_tibia_r (0.0350298 -0.420677 -0.0188458)
      PathPoint P3: calcn_r (0.136807 0.0178 -0.0305)
    Thelen2003Muscle per_brev_r: min_control=0 max_control=1 optimal_force=1 max_isometric_force=435
        optimal_fiber_length=0.05388573 tendon_slack_length=0.1735121 pennation_angle_at_optimal=0.08726646
        max_contraction_velocity=10 activation_time_constant=0.01 deactivation_time_constant=0.04
        FmaxTendonStrain=0.033 FmaxMuscleStrain=0.6 KshapeActive=0.5 KshapePassive=4 Af=0.3 Flen=1.8
      PathPoint P1: origin_tibia_r (-0.00745314 -0.281729 0.0346039)
      PathPoint P2: origin_tibia_r (-0.0210818 -0.445485 0.030132)
      PathPoint P3: origin_tibia_r (-0.0153322 -0.457304 0.0307708)
      PathPoint P4: calcn_r (0.0552627 0.027 0.0233)
      PathPoint P5: calcn_r (0.0794327 0.0219 0.0343)
    Thelen2003Muscle per_long_r: min_control=0 max_control=1 optimal_force=1 max_isometric_force=943
        optimal_fiber_length=0.05282181 tendon_slack_length=0.3719086 pennation_angle_at_optimal=0.1745329
        max_contraction_velocity=10 activation_time_constant=0.01 deactivation_time_constant=0.04
        FmaxTendonStrain=0.033 FmaxMuscleStrain=0.6 KshapeActive=0.5 KshapePassive=4 Af=0.3 Flen=1.8
      PathPoint P1: origin_tibia_r (0.00053237 -0.16695 0.0385434)
      PathPoint P2: origin_tibia_r (-0.02204 -0.447721 0.0304514)
      PathPoint P3: origin_tibia_r (-0.0172487 -0.459859 0.0307708)
      PathPoint P4: calcn_r (0.0513907 0.023 0.0221)
      PathPoint P5: calcn_r (0.0799021 0.0106 0.0284)
      PathPoint P6: calcn_r (0.0999656 0.0069 0.0118)
      PathPoint P7: calcn_r (0.141149 0.0085 -0.0184)
    Thelen2003Muscle per_tert_r: min_control=0 max_control=1 optimal_force=1 max_isometric_force=180
        optimal_fiber_length=0.08487461 tendon_slack_length=0.1074362 pennation_angle_at_optimal=0.2268928
        max_contraction_velocity=10 activation_time_constant=0.01 deactivation_time_constant=0.04
        FmaxTendonStrain=0.033 FmaxMuscleStrain=0.6 KshapeActive=0.5 KshapePassive=4 Af=0.3 Flen=1.8
      PathPoint P1: origin_tibia_r (0.00106473 -0.298552 0.0245954)
      PathPoint P2: origin_tibia_r (0.0243824 -0.433241 0.0169293)
      PathPoint P3: calcn_r (0.100552 0.0228 0.0299)
    Thelen2003Muscle ext_dig_r: min_control=0 max_control=1 optimal_force=1 max_isometric_force=512
        optimal_fiber_length=0.1091928 tendon_slack_length=0.3693286 pennation_angle_at_optimal=0.1396263
        max_contraction_velocity=10 activation_time_constant=0.01 deactivation_time_constant=0.04
        FmaxTendonStrain=0.033 FmaxMuscleStrain=0.6 KshapeActive=0.5 KshapePassive=4 Af=0.3 Flen=1.8
      PathPoint P1: origin_tibia_r (0.00340716 -0.14704 0.0293867)
      PathPoint P2: origin_tibia_r (0.0307708 -0.426639 0.00766609)
      PathPoint P3: calcn_r (0.108179 0.0388 -0.0001)
      PathPoint P4: calcn_r (0.189606 0.0055 0.013)
      PathPoint P5: toes_r (0.00025512 0.0047 0.0153)
      PathPoint P6: toes_r (0.0376724 -0.0004 0.025)
    Thelen2003Muscle ext_hal_r: min_control=0 max_control=1 optimal_force=1 max_isometric_force=162
        optimal_fiber_length=0.118318 tendon_slack_length=0.325108 pennation_angle_at_optimal=0.1047198
        max_contraction_velocity=10 activation_time_constant=0.01 deactivation_time_constant=0.04
        FmaxTendonStrain=0.033 FmaxMuscleStrain=0.6 KshapeActive=0.5 KshapePassive=4 Af=0.3 Flen=1.8
      PathPoint P1: origin_tibia_r (0.00127768 -0.188139 0.024276)
      PathPoint P2: origin_tibia_r (0.0347104 -0.424297 -0.00905025)
      PathPoint P3: calcn_r (0.113811 0.0389 -0.0211)
      PathPoint P4: calcn_r (0.151708 0.0309 -0.0257)
      PathPoint P5: calcn_r (0.203451 0.0139 -0.028)
      PathPoint P6: toes_r (0.0253417 0.0041 -0.0245)
      PathPoint P7: toes_r (0.047877 0.0034 -0.0186)
    Thelen2003Muscle glut_med1_l: min_control=0 max_control=1 optimal_force=1 max_isometric_force=819
        optimal_fiber_length=0.0578752 tendon_slack_length=0.0843788 pennation_angle_at_optimal=0.1396263
        max_contraction_velocity=10 activation_time_constant=0.01 deactivation_time_constant=0.04
        FmaxTendonStrain=0.033 FmaxMuscleStrain=0.6 KshapeActive=0.5 KshapePassive=4 Af=0.3 Flen=1.8
      PathPoint P1: pelvis (-0.0487718 0.0325757 -0.148926)
      PathPoint P2: femur_l (-0.0236666 -0.0127018 -0.0602521)
    Thelen2003Muscle glut_med2_l: min_control=0 max_control=1 optimal_force=1 max_isometric_force=573
        optimal_fiber_length=0.09106609 tendon_slack_length=0.05711838 pennation_angle_at_optimal=0
        max_contraction_velocity=10 activation_time_constant=0.01 deactivation_time_constant=0.04
        FmaxTendonStrain=0.033 FmaxMuscleStrain=0.6 KshapeActive=0.5 KshapePassive=4 Af=0.3 Flen=1.8
      PathPoint P1: pelvis (-0.102206 0.0476849 -0.0943565)
      PathPoint P2: femur_l (-0.0280091 -0.00629662 -0.0572124)
    Thelen2003Muscle glut_med3_l: min_control=0 max_control=1 optimal_force=1 max_isometric_force=653
        optimal_fiber_length=0.07141704 tendon_slack_length=0.05859293 pennation_angle_at_optimal=0.3316126
        max_contraction_velocity=10 activation_time_constant=0.01 deactivation_time_constant=0.04
        FmaxTendonStrain=0.033 FmaxMuscleStrain=0.6 KshapeActive=0.5 KshapePassive=4 Af=0.3 Flen=1.8
      PathPoint P1: pelvis (-0.146196 0.0112515 -0.0798212)
      PathPoint P2: femur_l (-0.0335458 -0.00510243 -0.0562353)
    Thelen2003Muscle glut_min1_l: min_control=0 max_control=1 optimal_force=1 max_isometric_force=270
        optimal_fiber_length=0.07307075 tendon_slack_length=0.01719312 pennation_angle_at_optimal=0.1745329
        max_contraction_velocity=10 activation_time_constant=0.01 deactivation_time_constant=0.04
        FmaxTendonStrain=0.033 FmaxMuscleStrain=0.6 KshapeActive=0.5 KshapePassive=4 Af=0.3 Flen=1.8
      PathPoint P1: pelvis (-0.0558246 -0.00857256 -0.130079)
      PathPoint P2: femur_l (-0.00781649 -0.0112905 -0.060795)
    Thelen2003Muscle glut_min2_l: min_control=0 max_control=1 optimal_force=1 max_isometric_force=285
        optimal_fiber_length=0.05968527 tendon_slack_length=0.02771102 pennation_angle_at_optimal=0
        max_contraction_velocity=10 activation_time_constant=0.01 deactivation_time_constant=0.04
        FmaxTendonStrain=0.033 FmaxMuscleStrain=0.6 KshapeActive=0.5 KshapePassive=4 Af=0.3 Flen=1.8
      PathPoint P1: pelvis (-0.0756681 -0.0069652 -0.122072)
      PathPoint P2: femur_l (-0.010422 -0.0112905 -0.060795)
    Thelen2003Muscle glut_min3_l: min_control=0 max_control=1 optimal_force=1 max_isometric_force=323
        optimal_fiber_length=0.04087733 tendon_slack_length=0.05486168 pennation_angle_at_optimal=0.01745329
        max_contraction_velocity=10 activation_time_constant=0.01 deactivation_time_constant=0.04
        FmaxTendonStrain=0.033 FmaxMuscleStrain=0.6 KshapeActive=0.5 KshapePassive=4 Af=0.3 Flen=1.8
      PathPoint P1: pelvis (-0.0996954 -0.00675089 -0.105443)
      PathPoint P2: femur_l (-0.0146559 -0.00901068 -0.0597093)
    Thelen2003Muscle semimem_l: min_control=0 max_control=1 optimal_force=1 max_isometric_force=1288
        optimal_fiber_length=0.08670957 tendon_slack_length=0.3891092 pennation_angle_at_optimal=0.2617994
        max_contraction_velocity=10 activation_time_constant=0.01 deactivation_time_constant=0.04
        FmaxTendonStrain=0.033 FmaxMuscleStrain=0.6 KshapeActive=0.5 KshapePassive=4 Af=0.3 Flen=1.8
      PathPoint P1: pelvis (-0.14249 -0.104446 -0.0880866)
      ConditionalPathPoint P2: origin_tibia_l (-0.0368574 -0.0372704 0.020028) range=(-0.558505 0.174533)
          coordinate=knee_angle_l
      PathPoint P3: origin_tibia_l (-0.0285962 -0.0505306 0.020727)
    Thelen2003Muscle semiten_l: min_control=0 max_control=1 optimal_force=1 max_isometric_force=410
        optimal_fiber_length=0.2173122 tendon_slack_length=0.2762352 pennation_angle_at_optimal=0.08726646
        max_contraction_velocity=10 activation_time_constant=0.01 deactivation_time_constant=0.04
        FmaxTendonStrain=0.033 FmaxMuscleStrain=0.6 KshapeActive=0.5 KshapePassive=4 Af=0.3 Flen=1.8
      PathPoint P1: pelvis (-0.151037 -0.117744 -0.0743889)
      ConditionalPathPoint P2: origin_tibia_l (-0.0445148 -0.0302803 0.0241162) range=(-0.331613 0.174533)
          coordinate=knee_angle_l
      PathPoint P3: origin_tibia_l (-0.035184 -0.0559427 0.0242327)
      PathPoint P4: origin_tibia_l (-0.011968 -0.0790104 0.0259485)
      PathPoint P5: origin_tibia_l (0.00285963 -0.101252 0.020441)
    Thelen2003Muscle bifemlh_l: min_control=0 max_control=1 optimal_force=1 max_isometric_force=896
        optimal_fiber_length=0.1182117 tendon_slack_length=0.3535507 pennation_angle_at_optimal=0
        max_contraction_velocity=10 activation_time_constant=0.01 deactivation_time_constant=0.04
        FmaxTendonStrain=0.033 FmaxMuscleStrain=0.2 KshapeActive=0.5 KshapePassive=4 Af=0.3 Flen=1.8
      PathPoint P1: pelvis (-0.150571 -0.109911 -0.0855367)
      PathPoint P2: origin_tibia_l (-0.0318795 -0.0381283 -0.0311699)
      PathPoint P3: origin_tibia_l (-0.0247834 -0.0596285 -0.0363278)
    Thelen2003Muscle bifemsh_l: min_control=0 max_control=1 optimal_force=1 max_isometric_force=804
        optimal_fiber_length=0.1866329 tendon_slack_length=0.09601344 pennation_angle_at_optimal=0.4014257
        max_contraction_velocity=10 activation_time_constant=0.01 deactivation_time_constant=0.04
        FmaxTendonStrain=0.033 FmaxMuscleStrain=0.2 KshapeActive=0.5 KshapePassive=4 Af=0.3 Flen=1.8
      PathPoint P1: femur_l (0.00542812 -0.229175 -0.0254036)
      PathPoint P2: origin_tibia_l (-0.0318795 -0.0381283 -0.0311699)
      PathPoint P3: origin_tibia_l (-0.0247834 -0.0596285 -0.0363278)
    Thelen2003Muscle sar_l: min_control=0 max_control=1 optimal_force=1 max_isometric_force=156
        optimal_fiber_length=0.5632657 tendon_slack_length=0.1083203 pennation_angle_at_optimal=0
        max_contraction_velocity=10 activation_time_constant=0.01 deactivation_time_constant=0.04
        FmaxTendonStrain=0.033 FmaxMuscleStrain=0.6 KshapeActive=0.5 KshapePassive=4 Af=0.3 Flen=1.8
      PathPoint P1: pelvis (-0.0182894 -0.00139304 -0.152991)
      PathPoint P2: femur_l (-0.00325688 -0.387351 0.0457048)
      PathPoint P3: origin_tibia_l (-0.00593107 -0.0443771 0.0422589)
      PathPoint P4: origin_tibia_l (0.00635473 -0.0623822 0.0405643)
      PathPoint P5: origin_tibia_l (0.0257366 -0.0889661 0.0266898)
    Thelen2003Muscle add_long_l: min_control=0 max_control=10 optimal_force=10 max_isometric_force=627
        optimal_fiber_length=0.1530938 tendon_slack_length=0.1220313 pennation_angle_at_optimal=0.1047198
        max_contraction_velocity=10 activation_time_constant=0.01 deactivation_time_constant=0.04
        FmaxTendonStrain=0.033 FmaxMuscleStrain=0.6 KshapeActive=0.5 KshapePassive=4 Af=0.3 Flen=1.8
      PathPoint P1: pelvis (-0.0377743 -0.0895833 -0.0208176)
      PathPoint P2: femur_l (0.00542812 -0.229175 -0.0254036)
    Thelen2003Muscle add_brev_l: min_control=0 max_control=1 optimal_force=1 max_isometric_force=429
        optimal_fiber_length=0.1517546 tendon_slack_length=0.02282025 pennation_angle_at_optimal=0
        max_contraction_velocity=10 activation_time_constant=0.01 deactivation_time_constant=0.04
        FmaxTendonStrain=0.033 FmaxMuscleStrain=0.6 KshapeActive=0.5 KshapePassive=4 Af=0.3 Flen=1.8
      PathPoint P1: pelvis (-0.0701693 -0.0980487 -0.0202017)
      PathPoint P2: femur_l (0.00097706 -0.129841 -0.0319173)
    Thelen2003Muscle add_mag1_l: min_control=0 max_control=1 optimal_force=1 max_isometric_force=381
        optimal_fiber_length=0.09992246 tendon_slack_length=0.06891204 pennation_angle_at_optimal=0.08726646
        max_contraction_velocity=10 activation_time_constant=0.01 deactivation_time_constant=0.04
        FmaxTendonStrain=0.033 FmaxMuscleStrain=0.6 KshapeActive=0.5 KshapePassive=4 Af=0.3 Flen=1.8
      PathPoint P1: pelvis (-0.0875024 -0.125802 -0.0314111)
      PathPoint P2: femur_l (-0.00488531 -0.131469 -0.0368027)
    Thelen2003Muscle add_mag2_l: min_control=0 max_control=1 optimal_force=1 max_isometric_force=343
        optimal_fiber_length=0.1338526 tendon_slack_length=0.1327464 pennation_angle_at_optimal=0.05235988
        max_contraction_velocity=10 activation_time_constant=0.01 deactivation_time_constant=0.04
        FmaxTendonStrain=0.033 FmaxMuscleStrain=0.6 KshapeActive=0.5 KshapePassive=4 Af=0.3 Flen=1.8
      PathPoint P1: pelvis (-0.0993368 -0.127731 -0.0379397)
      PathPoint P2: femur_l (0.00586237 -0.248065 -0.0246437)
    Thelen2003Muscle add_mag3_l: min_control=0 max_control=1 optimal_force=1 max_isometric_force=488
        optimal_fiber_length=0.1427837 tendon_slack_length=0.271398 pennation_angle_at_optimal=0.08726646
        max_contraction_velocity=10 activation_time_constant=0.01 deactivation_time_constant=0.04
        FmaxTendonStrain=0.033 FmaxMuscleStrain=0.6 KshapeActive=0.5 KshapePassive=4 Af=0.3 Flen=1.8
      PathPoint P1: pelvis (-0.132784 -0.122298 -0.0601369)
      PathPoint P2: femur_l (0.00759937 -0.416554 0.0288776)
    Thelen2003Muscle tfl_l: min_control=0 max_control=1 optimal_force=1 max_isometric_force=233
        optimal_fiber_length=0.1026763 tendon_slack_length=0.4593415 pennation_angle_at_optimal=0.05235988
        max_contraction_velocity=10 activation_time_constant=0.01 deactivation_time_constant=0.04
        FmaxTendonStrain=0.033 FmaxMuscleStrain=0.6 KshapeActive=0.5 KshapePassive=4 Af=0.3 Flen=1.8
      PathPoint P1: pelvis (-0.0371766 0.0229316 -0.152867)
      PathPoint P2: femur_l (0.0319173 -0.10802 -0.0648118)
      PathPoint P3: femur_l (0.00586237 -0.439569 -0.0387568)
      PathPoint P4: origin_tibia_l (0.00635473 -0.0515792 -0.0314559)
    Thelen2003Muscle pect_l: min_control=0 max_control=1 optimal_force=1 max_isometric_force=266
        optimal_fiber_length=0.1131846 tendon_slack_length=0.03735092 pennation_angle_at_optimal=0
        max_contraction_velocity=10 activation_time_constant=0.01 deactivation_time_constant=0.04
        FmaxTendonStrain=0.033 FmaxMuscleStrain=0.6 KshapeActive=0.5 KshapePassive=4 Af=0.3 Flen=1.8
      PathPoint P1: pelvis (-0.0515212 -0.0822966 -0.0555545)
      PathPoint P2: femur_l (-0.0132446 -0.0892383 -0.0274663)
    Thelen2003Muscle grac_l: min_control=0 max_control=1 optimal_force=1 max_isometric_force=162
        optimal_fiber_length=0.3810657 tendon_slack_length=0.1364042 pennation_angle_at_optimal=0.05235988
        max_contraction_velocity=10 activation_time_constant=0.01 deactivation_time_constant=0.04
        FmaxTendonStrain=0.033 FmaxMuscleStrain=0.6 KshapeActive=0.5 KshapePassive=4 Af=0.3 Flen=1.8
      PathPoint P1: pelvis (-0.0884707 -0.127195 -0.0344167)
      ConditionalPathPoint P2: origin_tibia_l (-0.0281408 -0.0337859 0.0399712) range=(-0.436332 0.174533)
          coordinate=knee_angle_l
      PathPoint P3: origin_tibia_l (-0.0205787 -0.0545765 0.0379165)
      PathPoint P4: origin_tibia_l (0.00635473 -0.0885424 0.0241479)
    Thelen2003Muscle glut_max1_l: min_control=0 max_control=1 optimal_force=1 max_isometric_force=573
        optimal_fiber_length=0.1542359 tendon_slack_length=0.135771 pennation_angle_at_optimal=0.08726646
        max_contraction_velocity=10 activation_time_constant=0.01 deactivation_time_constant=0.04
        FmaxTendonStrain=0.033 FmaxMuscleStrain=0.2 KshapeActive=0.5 KshapePassive=4 Af=0.3 Flen=1.8
      PathPoint P1: pelvis (-0.142849 0.0655801 -0.0862266)
      PathPoint P2: pelvis (-0.154325 0.00128588 -0.109138)
      PathPoint P3: femur_l (-0.049613 -0.0269235 -0.0425565)
      PathPoint P4: femur_l (-0.0300718 -0.0614463 -0.0510243)
    Thelen2003Muscle glut_max2_l: min_control=0 max_control=1 optimal_force=1 max_isometric_force=819
        optimal_fiber_length=0.162246 tendon_slack_length=0.1401717 pennation_angle_at_optimal=0
        max_contraction_velocity=10 activation_time_constant=0.01 deactivation_time_constant=0.04
        FmaxTendonStrain=0.033 FmaxMuscleStrain=0.2 KshapeActive=0.5 KshapePassive=4 Af=0.3 Flen=1.8
      PathPoint P1: pelvis (-0.161258 0.0188596 -0.0693508)
      PathPoint P2: pelvis (-0.164485 -0.0557217 -0.112587)
      PathPoint P3: femur_l (-0.0462476 -0.0575381 -0.0318088)
      PathPoint P4: femur_l (-0.0169357 -0.110299 -0.0454876)
    Thelen2003Muscle glut_max3_l: min_control=0 max_control=1 optimal_force=1 max_isometric_force=552
        optimal_fiber_length=0.162539 tendon_slack_length=0.1636677 pennation_angle_at_optimal=0.08726646
        max_contraction_velocity=10 activation_time_constant=0.01 deactivation_time_constant=0.04
        FmaxTendonStrain=0.033 FmaxMuscleStrain=0.2 KshapeActive=0.5 KshapePassive=4 Af=0.3 Flen=1.8
      PathPoint P1: pelvis (-0.186002 -0.0336473 -0.00714448)
      PathPoint P2: pelvis (-0.182775 -0.112729 -0.0496419)
      PathPoint P3: femur_l (-0.0324602 -0.113013 -0.0146559)
      PathPoint P4: femur_l (-0.00651374 -0.15405 -0.0446192)
    Thelen2003Muscle iliacus_l: min_control=0 max_control=1 optimal_force=1 max_isometric_force=1073
        optimal_fiber_length=0.110505 tendon_slack_length=0.110505 pennation_angle_at_optimal=0.1221731
        max_contraction_velocity=10 activation_time_constant=0.01 deactivation_time_constant=0.04
        FmaxTendonStrain=0.033 FmaxMuscleStrain=0.6 KshapeActive=0.5 KshapePassive=4 Af=0.3 Flen=1.8
      PathPoint P1: pelvis (-0.0805692 0.0391123 -0.105196)
      PathPoint P2: pelvis (-0.030841 -0.0589364 -0.0998996)
      ConditionalPathPoint P3: pelvis (-0.0344272 -0.0862614 -0.100516) range=(-1.5708 0.785398)
          coordinate=hip_flexion_l
      PathPoint P4: femur_l (0.00184556 -0.0589494 -0.00618806)
      PathPoint P5: femur_l (-0.0209525 -0.0674172 -0.0140045)
    Thelen2003Muscle psoas_l: min_control=0 max_control=1 optimal_force=1 max_isometric_force=1113
        optimal_fiber_length=0.1105381 tendon_slack_length=0.176861 pennation_angle_at_optimal=0.1396263
        max_contraction_velocity=10 activation_time_constant=0.01 deactivation_time_constant=0.04
        FmaxTendonStrain=0.033 FmaxMuscleStrain=0.6 KshapeActive=0.5 KshapePassive=4 Af=0.3 Flen=1.8
      PathPoint P1: pelvis (-0.0773416 0.0950483 -0.0355993)
      PathPoint P2: pelvis (-0.0284503 -0.0610795 -0.0934942)
      ConditionalPathPoint P3: pelvis (-0.0344272 -0.0862614 -0.100516) range=(-1.5708 0.785398)
          coordinate=hip_flexion_l
      PathPoint P4: femur_l (0.001737 -0.0550411 -0.00412537)
      PathPoint P5: femur_l (-0.0204097 -0.0648118 -0.0112905)
    Thelen2003Muscle quad_fem_l: min_control=0 max_control=1 optimal_force=1 max_isometric_force=381
        optimal_fiber_length=0.06242189 tendon_slack_length=0.02774306 pennation_angle_at_optimal=0
        max_contraction_velocity=10 activation_time_constant=0.01 deactivation_time_constant=0.04
        FmaxTendonStrain=0.033 FmaxMuscleStrain=0.6 KshapeActive=0.5 KshapePassive=4 Af=0.3 Flen=1.8
      PathPoint P1: pelvis (-0.136633 -0.123338 -0.064054)
      PathPoint P2: femur_l (-0.0413623 -0.0389739 -0.0397338)
    Thelen2003Muscle gem_l: min_control=0 max_control=1 optimal_force=1 max_isometric_force=164
        optimal_fiber_length=0.02741602 tendon_slack_length=0.04455103 pennation_angle_at_optimal=0
        max_contraction_velocity=10 activation_time_constant=0.01 deactivation_time_constant=0.04
        FmaxTendonStrain=0.033 FmaxMuscleStrain=0.6 KshapeActive=0.5 KshapePassive=4 Af=0.3 Flen=1.8
      PathPoint P1: pelvis (-0.135438 -0.0878688 -0.0879511)
      PathPoint P2: femur_l (-0.0154159 -0.00358256 -0.0480932)
    Thelen2003Muscle peri_l: min_control=0 max_control=1 optimal_force=1 max_isometric_force=444
        optimal_fiber_length=0.03003849 tendon_slack_length=0.1328625 pennation_angle_at_optimal=0.1745329
        max_contraction_velocity=10 activation_time_constant=0.01 deactivation_time_constant=0.04
        FmaxTendonStrain=0.033 FmaxMuscleStrain=0.6 KshapeActive=0.5 KshapePassive=4 Af=0.3 Flen=1.8
      PathPoint P1: pelvis (-0.166876 0.00032147 -0.0289475)
      PathPoint P2: pelvis (-0.14261 -0.0295753 -0.0809298)
      PathPoint P3: femur_l (-0.0160672 -0.00390825 -0.0474418)
    Thelen2003Muscle rect_fem_l: min_control=0 max_control=1 optimal_force=1 max_isometric_force=1169
        optimal_fiber_length=0.123741 tendon_slack_length=0.3364888 pennation_angle_at_optimal=0.08726646
        max_contraction_velocity=10 activation_time_constant=0.01 deactivation_time_constant=0.04
        FmaxTendonStrain=0.033 FmaxMuscleStrain=0.2 KshapeActive=0.5 KshapePassive=4 Af=0.3 Flen=1.8
      PathPoint P1: pelvis (-0.035264 -0.0333258 -0.119239)
      ConditionalPathPoint P2: femur_l (0.0362598 -0.437506 -0.00206269) range=(-2.61799 -1.45997)
          coordinate=knee_angle_l
      MovingPathPoint P3: origin_tibia_l (0.0654087 0.0222246 -0.00148277) x_coordinate=knee_angle_l
          y_coordinate=knee_angle_l z_coordinate=knee_angle_l
        x_location: MultiplierFunction: scale=1.05912
          SimmSpline: x=(-2.0944 -1.99997 -1.5708 -1.45752 -1.39626 -1.0472 -0.698132 -0.526391 -0.349066 -0.174533 0 0.00017453 0.00034907 0.0279253 0.0872665 0.174533 2.0944)
              y=(0.0155805 0.0179938 0.0275081 0.0296564 0.0307615 0.0365695 0.0422074 0.0450902 0.048391 0.0534299 0.0617576 0.0617669 0.0617762 0.0633083 0.066994 0.0733035 0.0573481)
        y_location: MultiplierFunction: scale=1.05912
          SimmSpline: x=(-2.0944 -1.99997 -1.5708 -1.45752 -1.39626 -1.0472 -0.698132 -0.526391 -0.349066 -0.174533 0 0.00017453 0.00034907 0.0279253 0.0872665 0.174533 2.0944)
              y=(0.0234116 0.0237613 0.0251141 0.0252795 0.0253146 0.0249184 0.0242373 0.0238447 0.0234197 0.0227644 0.020984 0.0209814 0.0209788 0.0205225 0.0191754 0.0159554 -0.0673774)
        z_location: MultiplierFunction: scale=1.05912
          SimmSpline: x=(-2.0944 0.1745) y=(-0.0014 -0.0014)
    Thelen2003Muscle vas_med_l: min_control=0 max_control=1 optimal_force=1 max_isometric_force=1294
        optimal_fiber_length=0.0967646 tendon_slack_length=0.1369926 pennation_angle_at_optimal=0.08726646
        max_contraction_velocity=10 activation_time_constant=0.01 deactivation_time_constant=0.04
        FmaxTendonStrain=0.033 FmaxMuscleStrain=0.2 KshapeActive=0.5 KshapePassive=4 Af=0.3 Flen=1.8
      PathPoint P1: femur_l (0.0151987 -0.227872 -0.0204097)
      PathPoint P2: femur_l (0.0386482 -0.300609 -0.00097706)
      ConditionalPathPoint P3: femur_l (0.0401681 -0.439461 0.0135703) range=(-2.61799 -1.21004)
          coordinate=knee_angle_l
      ConditionalPathPoint P4: femur_l (0.0297461 -0.461933 0.0142217) range=(-2.61799 -1.78006)
          coordinate=knee_angle_l
      MovingPathPoint P5: origin_tibia_l (0.0592669 0.02308 0.0154632) x_coordinate=knee_angle_l
          y_coordinate=knee_angle_l z_coordinate=knee_angle_l
        x_location: MultiplierFunction: scale=1.05912
          SimmSpline: x=(-2.0944 -1.99997 -1.5708 -1.45752 -1.39626 -1.0472 -0.698132 -0.526391 -0.349066 -0.174533 0 0.00017453 0.00034907 0.0279253 0.0872665 0.174533 2.0944)
              y=(0.00981097 0.0122243 0.0217371 0.0238851 0.0249902 0.0307959 0.0364187 0.0392871 0.0425654 0.0475764 0.0559586 0.0559681 0.0559776 0.0575419 0.0613368 0.0679503 0.0629332)
        y_location: MultiplierFunction: scale=1.05912
          SimmSpline: x=(-2.0944 -1.99997 -1.5708 -1.45752 -1.39626 -1.0472 -0.698132 -0.526391 -0.349066 -0.174533 0 0.00017453 0.00034907 0.0279253 0.0872665 0.174533 2.0944)
              y=(0.0224154 0.0227651 0.0241265 0.0242933 0.0243287 0.0239462 0.0233593 0.0230677 0.0228342 0.0226362 0.0217917 0.0217903 0.0217889 0.0215365 0.0206842 0.0183269 -0.0656205)
        z_location: MultiplierFunction: scale=1.05912
          SimmSpline: x=(-2.0944 2.0944) y=(0.0146 0.0146)
    Thelen2003Muscle vas_int_l: min_control=0 max_control=1 optimal_force=1 max_isometric_force=1365
        optimal_fiber_length=0.09460222 tendon_slack_length=0.1478839 pennation_angle_at_optimal=0.05235988
        max_contraction_velocity=10 activation_time_constant=0.01 deactivation_time_constant=0.04
        FmaxTendonStrain=0.033 FmaxMuscleStrain=0.2 KshapeActive=0.5 KshapePassive=4 Af=0.3 Flen=1.8
      PathPoint P1: femur_l (0.0314831 -0.208874 -0.0336544)
      PathPoint P2: femur_l (0.0363684 -0.226244 -0.0309403)
      ConditionalPathPoint P3: femur_l (0.0372369 -0.437506 -0.00597094) range=(-2.61799 -1.42) coordinate=knee_angle_l
      MovingPathPoint P4: origin_tibia_l (0.0654087 0.0222246 -0.00148277) x_coordinate=knee_angle_l
          y_coordinate=knee_angle_l z_coordinate=knee_angle_l
        x_location: MultiplierFunction: scale=1.05912
          SimmSpline: x=(-2.0944 -1.99997 -1.5708 -1.45752 -1.39626 -1.0472 -0.698132 -0.526391 -0.349066 -0.174533 0 0.00017453 0.00034907 0.0279253 0.0872665 0.174533 2.0944)
              y=(0.0155805 0.0179938 0.0275081 0.0296564 0.0307615 0.0365695 0.0422074 0.0450902 0.048391 0.0534299 0.0617576 0.0617669 0.0617762 0.0633083 0.066994 0.0733035 0.0573481)
        y_location: MultiplierFunction: scale=1.05912
          SimmSpline: x=(-2.0944 -1.99997 -1.5708 -1.45752 -1.39626 -1.0472 -0.698132 -0.526391 -0.349066 -0.174533 0 0.00017453 0.00034907 0.0279253 0.0872665 0.174533 2.0944)
              y=(0.0234116 0.0237613 0.0251141 0.0252795 0.0253146 0.0249184 0.0242373 0.0238447 0.0234197 0.0227644 0.020984 0.0209814 0.0209788 0.0205225 0.0191754 0.0159554 -0.0673774)
        z_location: MultiplierFunction: scale=1.05912
          SimmSpline: x=(-2.0944 0.1745) y=(-0.0014 -0.0014)
    Thelen2003Muscle vas_lat_l: min_control=0 max_control=1 optimal_force=1 max_isometric_force=1871
        optimal_fiber_length=0.09128606 tendon_slack_length=0.170618 pennation_angle_at_optimal=0.08726646
        max_contraction_velocity=10 activation_time_constant=0.01 deactivation_time_constant=0.04
        FmaxTendonStrain=0.033 FmaxMuscleStrain=0.2 KshapeActive=0.5 KshapePassive=4 Af=0.3 Flen=1.8
      PathPoint P1: femur_l (0.005211 -0.201275 -0.0378883)
      PathPoint P2: femur_l (0.0292033 -0.281285 -0.044402)
      ConditionalPathPoint P3: femur_l (0.039191 -0.437506 -0.0222553) range=(-2.61799 -1.21004)
          coordinate=knee_angle_l
      ConditionalPathPoint P4: femur_l (0.0274663 -0.46063 -0.0199755) range=(-2.61799 -1.92004)
          coordinate=knee_angle_l
      MovingPathPoint P5: origin_tibia_l (0.0635003 0.0207444 -0.0174755) x_coordinate=knee_angle_l
          y_coordinate=knee_angle_l z_coordinate=knee_angle_l
        x_location: MultiplierFunction: scale=1.05912
          SimmSpline: x=(-2.0944 -1.99997 -1.5708 -1.45752 -1.39626 -1.0472 -0.698132 -0.526391 -0.349066 -0.174533 0 0.00017453 0.00034907 0.0279253 0.0872665 0.174533 2.0944)
              y=(0.0142897 0.016703 0.0262145 0.0283623 0.0294674 0.0352709 0.0408785 0.0437291 0.0469704 0.0518742 0.0599557 0.0599647 0.0599738 0.0614577 0.0650351 0.0711867 0.0583766)
        y_location: MultiplierFunction: scale=1.05912
          SimmSpline: x=(-2.0944 -1.99997 -1.5708 -1.45752 -1.39626 -1.0472 -0.698132 -0.526391 -0.349066 -0.174533 0 0.00017453 0.00034907 0.0279253 0.0872665 0.174533 2.0944)
              y=(0.0215318 0.0218815 0.0232362 0.0234019 0.0234371 0.0230439 0.0223842 0.0220151 0.0216359 0.0210971 0.0195864 0.0195842 0.019582 0.01919 0.018008 0.0151073 -0.0653421)
        z_location: MultiplierFunction: scale=1.05912
          SimmSpline: x=(-2.0944 2.0944) y=(-0.0165 -0.0165)
    Thelen2003Muscle med_gas_l: min_control=0 max_control=1 optimal_force=1 max_isometric_force=1558
        optimal_fiber_length=0.06386441 tendon_slack_length=0.4151187 pennation_angle_at_optimal=0.296706
        max_contraction_velocity=10 activation_time_constant=0.01 deactivation_time_constant=0.04
        FmaxTendonStrain=0.033 FmaxMuscleStrain=0.6 KshapeActive=0.5 KshapePassive=4 Af=0.3 Flen=1.8
      PathPoint P1: femur_l (-0.0206269 -0.426542 0.0255122)
      ConditionalPathPoint P2: femur_l (-0.0325687 -0.436638 0.0280091) range=(-0.785398 0.174533)
          coordinate=knee_angle_l
      PathPoint P3: calcn_l (0 0.031 0.0053)
    Thelen2003Muscle lat_gas_l: min_control=0 max_control=1 optimal_force=1 max_isometric_force=683
        optimal_fiber_length=0.06810587 tendon_slack_length=0.4043786 pennation_angle_at_optimal=0.1396263
        max_contraction_velocity=10 activation_time_constant=0.01 deactivation_time_constant=0.04
        FmaxTendonStrain=0.033 FmaxMuscleStrain=0.6 KshapeActive=0.5 KshapePassive=4 Af=0.3 Flen=1.8
      PathPoint P1: femur_l (-0.0238837 -0.428387 -0.029529)
      ConditionalPathPoint P2: femur_l (-0.0325687 -0.436204 -0.0297461) range=(-0.785398 0.174533)
          coordinate=knee_angle_l
      PathPoint P3: calcn_l (0 0.031 0.0053)
    Thelen2003Muscle soleus_l: min_control=0 max_control=1 optimal_force=1 max_isometric_force=3549
        optimal_fiber_length=0.05341887 tendon_slack_length=0.2670944 pennation_angle_at_optimal=0.4363323
        max_contraction_velocity=10 activation_time_constant=0.01 deactivation_time_constant=0.04
        FmaxTendonStrain=0.033 FmaxMuscleStrain=0.6 KshapeActive=0.5 KshapePassive=4 Af=0.3 Flen=1.8
      PathPoint P1: origin_tibia_l (-0.00254189 -0.162363 -0.00751975)
      PathPoint P2: calcn_l (0 0.031 0.0053)
    Thelen2003Muscle tib_post_l: min_control=0 max_control=1 optimal_force=1 max_isometric_force=1588
        optimal_fiber_length=0.03328494 tendon_slack_length=0.3328494 pennation_angle_at_optimal=0.2094395
        max_contraction_velocity=10 activation_time_constant=0.01 deactivation_time_constant=0.04
        FmaxTendonStrain=0.033 FmaxMuscleStrain=0.6 KshapeActive=0.5 KshapePassive=4 Af=0.3 Flen=1.8
      PathPoint P1: origin_tibia_l (-0.00995573 -0.142769 -0.00201233)
      PathPoint P2: origin_tibia_l (-0.0152513 -0.42905 0.0242539)
      PathPoint P3: calcn_l (0.0487479 0.0334 0.0286)
      PathPoint P4: calcn_l (0.090248 0.0159 0.0281)
    Thelen2003Muscle flex_dig_l: min_control=0 max_control=1 optimal_force=1 max_isometric_force=310
        optimal_fiber_length=0.03636029 tendon_slack_length=0.4277681 pennation_angle_at_optimal=0.1221731
        max_contraction_velocity=10 activation_time_constant=0.01 deactivation_time_constant=0.04
        FmaxTendonStrain=0.033 FmaxMuscleStrain=0.6 KshapeActive=0.5 KshapePassive=4 Af=0.3 Flen=1.8
      PathPoint P1: origin_tibia_l (-0.0087907 -0.216696 0.00190641)
      PathPoint P2: origin_tibia_l (-0.0163105 -0.42905 0.0207588)
      PathPoint P3: calcn_l (0.0509691 0.0315 0.028)
      PathPoint P4: calcn_l (0.0827663 0.0176 0.0263)
      PathPoint P5: calcn_l (0.193823 -0.0081 -0.0116)
      PathPoint P6: toes_l (-0.00161116 -0.0078 -0.0147)
      PathPoint P7: toes_l (0.0241674 -0.0071 -0.0215)
      PathPoint P8: toes_l (0.0373958 -0.006 -0.0242)
    Thelen2003Muscle flex_hal_l: min_control=0 max_control=1 optimal_force=1 max_isometric_force=322
        optimal_fiber_length=0.04599234 tendon_slack_length=0.406444 pennation_angle_at_optimal=0.1745329
        max_contraction_velocity=10 activation_time_constant=0.01 deactivation_time_constant=0.04
        FmaxTendonStrain=0.033 FmaxMuscleStrain=0.6 KshapeActive=0.5 KshapePassive=4 Af=0.3 Flen=1.8
      PathPoint P1: origin_tibia_l (-0.00836705 -0.247199 -0.0258425)
      PathPoint P2: origin_tibia_l (-0.0196996 -0.432015 0.0184287)
      PathPoint P3: calcn_l (0.0437212 0.0276 0.0241)
      PathPoint P4: calcn_l (0.121344 0.0068 0.0256)
      PathPoint P5: calcn_l (0.201772 -0.0053 0.0269)
      PathPoint P6: toes_l (0.0131437 -0.0064 0.0265)
      PathPoint P7: toes_l (0.0476564 -0.0102 0.0181)
    Thelen2003Muscle tib_ant_l: min_control=0 max_control=1 optimal_force=1 max_isometric_force=905
        optimal_fiber_length=0.1053465 tendon_slack_length=0.2397172 pennation_angle_at_optimal=0.08726646
        max_contraction_velocity=10 activation_time_constant=0.01 deactivation_time_constant=0.04
        FmaxTendonStrain=0.033 FmaxMuscleStrain=0.6 KshapeActive=0.5 KshapePassive=4 Af=0.3 Flen=1.8
      PathPoint P1: origin_tibia_l (0.0189582 -0.172001 -0.0121799)
      PathPoint P2: origin_tibia_l (0.0348451 -0.418458 0.0187464)
      PathPoint P3: calcn_l (0.136307 0.0178 0.0305)
    Thelen2003Muscle per_brev_l: min_control=0 max_control=1 optimal_force=1 max_isometric_force=435
        optimal_fiber_length=0.0535904 tendon_slack_length=0.1725611 pennation_angle_at_optimal=0.08726646
        max_contraction_velocity=10 activation_time_constant=0.01 deactivation_time_constant=0.04
        FmaxTendonStrain=0.033 FmaxMuscleStrain=0.6 KshapeActive=0.5 KshapePassive=4 Af=0.3 Flen=1.8
      PathPoint P1: origin_tibia_l (-0.00741385 -0.280243 -0.0344214)
      PathPoint P2: origin_tibia_l (-0.0209706 -0.443136 -0.0299731)
      PathPoint P3: origin_tibia_l (-0.0152513 -0.454892 -0.0306086)
      PathPoint P4: calcn_l (0.0550606 0.027 -0.0233)
      PathPoint P5: calcn_l (0.0791423 0.0219 -0.0343)
    Thelen2003Muscle per_long_l: min_control=0 max_control=1 optimal_force=1 max_isometric_force=943
        optimal_fiber_length=0.05256729 tendon_slack_length=0.3701166 pennation_angle_at_optimal=0.1745329
        max_contraction_velocity=10 activation_time_constant=0.01 deactivation_time_constant=0.04
        FmaxTendonStrain=0.033 FmaxMuscleStrain=0.6 KshapeActive=0.5 KshapePassive=4 Af=0.3 Flen=1.8
      PathPoint P1: origin_tibia_l (0.00052956 -0.16607 -0.0383402)
      PathPoint P2: origin_tibia_l (-0.0219238 -0.44536 -0.0302908)
      PathPoint P3: origin_tibia_l (-0.0171577 -0.457434 -0.0306086)
      PathPoint P4: calcn_l (0.0512029 0.023 -0.0221)
      PathPoint P5: calcn_l (0.0796099 0.0106 -0.0284)
      PathPoint P6: calcn_l (0.0996001 0.0069 -0.0118)
      PathPoint P7: calcn_l (0.140633 0.0085 0.0184)
    Thelen2003Muscle per_tert_l: min_control=0 max_control=1 optimal_force=1 max_isometric_force=180
        optimal_fiber_length=0.08442004 tendon_slack_length=0.1068608 pennation_angle_at_optimal=0.2268928
        max_contraction_velocity=10 activation_time_constant=0.01 deactivation_time_constant=0.04
        FmaxTendonStrain=0.033 FmaxMuscleStrain=0.6 KshapeActive=0.5 KshapePassive=4 Af=0.3 Flen=1.8
      PathPoint P1: origin_tibia_l (0.00105912 -0.296977 -0.0244657)
      PathPoint P2: origin_tibia_l (0.0242539 -0.430956 -0.01684)
      PathPoint P3: calcn_l (0.100185 0.0228 -0.0299)
    Thelen2003Muscle ext_dig_l: min_control=0 max_control=1 optimal_force=1 max_isometric_force=512
        optimal_fiber_length=0.1086627 tendon_slack_length=0.3675355 pennation_angle_at_optimal=0.1396263
        max_contraction_velocity=10 activation_time_constant=0.01 deactivation_time_constant=0.04
        FmaxTendonStrain=0.033 FmaxMuscleStrain=0.6 KshapeActive=0.5 KshapePassive=4 Af=0.3 Flen=1.8
      PathPoint P1: origin_tibia_l (0.00338918 -0.146264 -0.0292317)
      PathPoint P2: origin_tibia_l (0.0306086 -0.424389 -0.00762567)
      PathPoint P3: calcn_l (0.107783 0.0388 0.0001)
      PathPoint P4: calcn_l (0.188913 0.0055 -0.013)
      PathPoint P5: toes_l (0.00025439 0.0047 -0.0153)
      PathPoint P6: toes_l (0.0375654 -0.0004 -0.025)
    Thelen2003Muscle ext_hal_l: min_control=0 max_control=1 optimal_force=1 max_isometric_force=162
        optimal_fiber_length=0.1177501 tendon_slack_length=0.3235475 pennation_angle_at_optimal=0.1047198
        max_contraction_velocity=10 activation_time_constant=0.01 deactivation_time_constant=0.04
        FmaxTendonStrain=0.033 FmaxMuscleStrain=0.6 KshapeActive=0.5 KshapePassive=4 Af=0.3 Flen=1.8
      PathPoint P1: origin_tibia_l (0.00127094 -0.187147 -0.0241479)
      PathPoint P2: origin_tibia_l (0.0345273 -0.422059 0.00900252)
      PathPoint P3: calcn_l (0.113394 0.0389 0.0211)
      PathPoint P4: calcn_l (0.151154 0.0309 0.0257)
      PathPoint P5: calcn_l (0.202707 0.0139 0.028)
      PathPoint P6: toes_l (0.0252698 0.0041 0.0245)
      PathPoint P7: toes_l (0.0477412 0.0034 0.0186)
    Thelen2003Muscle ercspn_r: min_control=0 max_control=1 optimal_force=10 max_isometric_force=2500
        optimal_fiber_length=0.106317 tendon_slack_length=0.05407926 pennation_angle_at_optimal=0
        max_contraction_velocity=10 activation_time_constant=0.01 deactivation_time_constant=0.04
        FmaxTendonStrain=0.033 FmaxMuscleStrain=0.6 KshapeActive=0.5 KshapePassive=4 Af=0.3 Flen=1.8
      PathPoint P1: pelvis (-0.16735 0.04704 0.05371)
      PathPoint P2: torso (-0.04155 0.09075 0.0320096)
      PathWrap: wrap_object=BACK method=hybrid range=(-2 -2)
    Thelen2003Muscle ercspn_l: min_control=0 max_control=1 optimal_force=10 max_isometric_force=2500
        optimal_fiber_length=0.106317 tendon_slack_length=0.05407926 pennation_angle_at_optimal=0
        max_contraction_velocity=10 activation_time_constant=0.01 deactivation_time_constant=0.04
        FmaxTendonStrain=0.033 FmaxMuscleStrain=0.6 KshapeActive=0.5 KshapePassive=4 Af=0.3 Flen=1.8
      PathPoint P1: pelvis (-0.16735 0.04704 -0.05371)
      PathPoint P2: torso (-0.04155 0.090075 -0.0320096)
      PathWrap: wrap_object=BACK method=hybrid range=(-2 -2)
    Thelen2003Muscle rect_abd_r: max_isometric_force=263 optimal_fiber_length=0.2238 tendon_slack_length=0.017
      PathPoint P1: pelvis (-0.03 -0.08 -0.0106888)
      PathPoint P2: torso (0.1 0.24 -0.0344509)
    Thelen2003Muscle rect_abd_l: max_isometric_force=263 optimal_fiber_length=0.2238 tendon_slack_length=0.017
      PathPoint P1: pelvis (-0.03 -0.08 0.01069)
      PathPoint P2: torso (0.1 0.24 0.03445)
    Thelen2003Muscle intobl_r: min_control=0 max_control=1 optimal_force=1 max_isometric_force=900
        optimal_fiber_length=0.1170682 tendon_slack_length=0.1170682 pennation_angle_at_optimal=0
        max_contraction_velocity=10 activation_time_constant=0.01 deactivation_time_constant=0.04
        FmaxTendonStrain=0.033 FmaxMuscleStrain=0.6 KshapeActive=0.5 KshapePassive=4 Af=0.3 Flen=1.8
      PathPoint P1: pelvis (-0.0478155 0.0750099 0.14252)
      PathPoint P2: torso (0.0783322 0.185823 0.019923)
    Thelen2003Muscle intobl_l: min_control=0 max_control=1 optimal_force=1 max_isometric_force=900
        optimal_fiber_length=0.1170682 tendon_slack_length=0.1170682 pennation_angle_at_optimal=0
        max_contraction_velocity=10 activation_time_constant=0.01 deactivation_time_constant=0.04
        FmaxTendonStrain=0.033 FmaxMuscleStrain=0.6 KshapeActive=0.5 KshapePassive=4 Af=0.3 Flen=1.8
      PathPoint P1: pelvis (-0.0478155 0.0750099 -0.14252)
      PathPoint P2: torso (0.0783322 0.185823 -0.019923)
    Thelen2003Muscle extobl_r: min_control=0 max_control=1 optimal_force=1 max_isometric_force=900
        optimal_fiber_length=0.1372546 tendon_slack_length=0.1601303 pennation_angle_at_optimal=0
        max_contraction_velocity=10 activation_time_constant=0.01 deactivation_time_constant=0.04
        FmaxTendonStrain=0.033 FmaxMuscleStrain=0.6 KshapeActive=0.5 KshapePassive=4 Af=0.3 Flen=1.8
      PathPoint P1: pelvis (-0.0358617 -0.0681519 0.0123181)
      PathPoint P2: torso (0.0727371 0.127754 0.146102)
    Thelen2003Muscle extobl_l: min_control=0 max_control=1 optimal_force=1 max_isometric_force=900
        optimal_fiber_length=0.1372546 tendon_slack_length=0.1601303 pennation_angle_at_optimal=0
        max_contraction_velocity=10 activation_time_constant=0.01 deactivation_time_constant=0.04
        FmaxTendonStrain=0.033 FmaxMuscleStrain=0.6 KshapeActive=0.5 KshapePassive=4 Af=0.3 Flen=1.8
      PathPoint P1: pelvis (-0.0358617 -0.0681519 -0.0123181)
      PathPoint P2: torso (0.0727371 0.127754 -0.146102)
    ObjectGroup R_hip_abd: members=(glut_max1_r glut_med1_r glut_med2_r glut_med3_r glut_min1_r glut_min2_r glut_min3_r peri_r sar_r tfl_r)
    ObjectGroup R_hip_flex: members=(add_brev_r add_long_r glut_med1_r glut_min1_r grac_r iliacus_r pect_r psoas_r sar_r tfl_r)
    ObjectGroup R_hip_inrot: members=(glut_med1_r glut_min1_r iliacus_r psoas_r tfl_r)
    ObjectGroup R_hip_exrot: members=(gem_r glut_med3_r glut_min3_r peri_r quad_fem_r)
    ObjectGroup R_hip_ext: members=(add_long_r add_mag1_r add_mag2_r add_mag3_r glut_max1_r glut_max2_r glut_max3_r glut_med3_r glut_min3_r semimem_r semiten_r)
    ObjectGroup R_hip_add: members=(add_brev_r add_long_r add_mag1_r add_mag2_r add_mag3_r grac_r pect_r semimem_r semiten_r)
    ObjectGroup R_knee_bend: members=(bifemsh_r grac_r sar_r semimem_r semiten_r)
    ObjectGroup R_knee_ext: members=vas_int_r
    ObjectGroup R_ankle_pf: members=(flex_dig_r flex_hal_r per_brev_r per_long_r tib_post_r)
    ObjectGroup R_inverter: members=(ext_hal_r flex_dig_r flex_hal_r tib_ant_r tib_post_r)
    ObjectGroup R_ankle_df: members=(ext_dig_r ext_hal_r per_tert_r tib_ant_r)
    ObjectGroup R_everter: members=(ext_dig_r per_brev_r per_long_r per_tert_r)
    ObjectGroup L_hip_abd: members=(glut_max1_l glut_med1_l glut_med2_l glut_med3_l glut_min1_l glut_min2_l glut_min3_l peri_l sar_l tfl_l)
    ObjectGroup L_hip_flex: members=(add_brev_l add_long_l glut_med1_l glut_min1_l grac_l iliacus_l pect_l psoas_l rect_fem_l sar_l tfl_l)
    ObjectGroup L_hip_inrot: members=(glut_med1_l glut_min1_l iliacus_l psoas_l tfl_l)
    ObjectGroup L_hip_exrot: members=(gem_l glut_med3_l glut_min3_l peri_l quad_fem_l)
    ObjectGroup L_hip_ext: members=(add_long_l add_mag1_l add_mag2_l add_mag3_l bifemlh_l glut_max1_l glut_max2_l glut_max3_l glut_med3_l glut_min3_l semimem_l semiten_l)
    ObjectGroup L_hip_add: members=(add_brev_l add_long_l add_mag1_l add_mag2_l add_mag3_l bifemlh_l grac_l pect_l semimem_l semiten_l)
    ObjectGroup L_knee_bend: members=(bifemlh_l bifemsh_l grac_l lat_gas_l med_gas_l sar_l semimem_l semiten_l)
    ObjectGroup L_knee_ext: members=(rect_fem_l vas_int_l vas_lat_l vas_med_l)
    ObjectGroup L_ankle_pf: members=(flex_dig_l flex_hal_l lat_gas_l med_gas_l per_brev_l per_long_l soleus_l tib_post_l)
    ObjectGroup L_inverter: members=(ext_hal_l flex_dig_l flex_hal_l tib_ant_l tib_post_l)
    ObjectGroup L_ankle_df: members=(ext_dig_l ext_hal_l per_tert_l tib_ant_l)
    ObjectGroup L_everter: members=(ext_dig_l per_brev_l per_long_l per_tert_l)
    ObjectGroup back_ext: members=(ercspn_l ercspn_r)
    ObjectGroup back_rlb: members=(ercspn_r extobl_r intobl_r)
    ObjectGroup back_introt: members=(ercspn_r extobl_l intobl_r)
    ObjectGroup back_llb: members=(ercspn_l extobl_l intobl_l)
    ObjectGroup back_extrot: members=(ercspn_l extobl_r intobl_l)
    ObjectGroup back_flex: members=(extobl_l extobl_r intobl_l intobl_r)
  MarkerSet:
    Marker LFHD: head (0.0908845 0.115599 -0.0697608)
    Marker RFHD: head (0.0901531 0.115942 0.0706516)
    Marker LBHD: head (-0.0594123 0.103721 -0.0898411)
    Marker RBHD: head (-0.06 0.1 0.09)
    Marker THO1: torso (-0.090285 0.497162 0.032161)
    Marker THO2: torso (-0.0904622 0.496124 -0.0287682)
    Marker THO3: torso (-0.0988881 0.466295 0.00210932)
    Marker CLAV: torso (0.0370551 0.448981 -0.00119642) fixed=true
    Marker T8: torso (-0.118393 0.282509 -2.50945e-5)
    Marker LACR1: torso (-0.06 0.48 -0.18)
    Marker LACR2: torso (0.00047835 0.496396 -0.174585)
    Marker LACR3: torso (-0.0458975 0.527471 -0.180711)
    Marker LACR4: torso (-0.0348005 0.502984 -0.155769)
    Marker LSJC: torso (-0.030125 0.489568 -0.175345)
    Marker LPUA1: humerus_l (-0.0197049 -0.0623693 -0.0171165)
    Marker LPUA2: humerus_l (-0.0177419 -0.177337 -0.0198839)
    Marker LPUA3: humerus_l (0.0355477 -0.121322 -0.0249981)
    Marker LDUA1: humerus_l (-0.00119404 -0.257085 -0.0363705)
    Marker LDUA2: humerus_l (0.000125331 -0.253183 0.0344516)
    Marker LDUA3: humerus_l (-0.0286018 -0.21819 -0.00998766)
    Marker LLEP: humerus_l (0.013 -0.31 -0.0402203) fixed=true
    Marker LMEP: humerus_l (0.00402813 -0.308214 0.0440541)
    Marker LEJC: humerus_l (0.00982869 -0.308763 0.00322981) fixed=true
    Marker LFA1: radius_l (-0.0182663 -0.194031 0.0182418)
    Marker LFA2: radius_l (-0.0133573 -0.181248 -0.0492331)
    Marker LFA3: radius_l (-0.0275363 -0.148636 -0.0135967)
    Marker LWRR: radius_l (-0.015 -0.27 -0.049) fixed=true
    Marker LWRU: ulna_l (-0.043 -0.28 -0.032)
    Marker LWJC: ulna_l (-0.00962514 -0.284319 -0.0226752) fixed=true
    Marker LHNDR: hand_l (-0.024 -0.042 -0.014) fixed=true
    Marker LHNDU: hand_l (-0.019 -0.044 0.032) fixed=true
    Marker LCAR: hand_l (-0.0185999 -0.0657005 0.00839808) fixed=true
    Marker RACR1: torso (-0.0706394 0.485129 0.175185) fixed=true
    Marker RACR2: torso (-0.00971769 0.496439 0.17336) fixed=true
    Marker RACR3: torso (-0.0442984 0.527927 0.167354) fixed=true
    Marker RACR4: torso (-0.0411586 0.497906 0.14241) fixed=true
    Marker RSJC: torso (-0.0395951 0.492929 0.173961) fixed=true
    Marker RPUA1: humerus_r (0.00727587 -0.0618777 0.0331513)
    Marker RPUA2: humerus_r (0.0025103 -0.166762 0.0342981)
    Marker RPUA3: humerus_r (0.0436348 -0.120258 0.00574316)
    Marker RDUA1: humerus_r (-0.000941374 -0.239791 0.0331565)
    Marker RDUA2: humerus_r (-0.0199542 -0.241933 -0.0333699)
    Marker RDUA3: humerus_r (-0.0248716 -0.201171 0.00374867)
    Marker RLEP: humerus_r (0.0271061 -0.301217 0.0362878) fixed=true
    Marker RMEP: humerus_r (0.000636142 -0.310484 -0.0454255)
    Marker REJC: humerus_r (0.0124529 -0.306792 -0.00391787) fixed=true
    Marker RFA1: radius_r (-0.0145794 -0.188197 -0.0204435)
    Marker RFA2: radius_r (0.00456274 -0.185909 0.0479251)
    Marker RFA3: radius_r (-0.0185554 -0.147253 0.015829)
    Marker RWRR: radius_r (-0.007 -0.27 0.045) fixed=true
    Marker RWRU: ulna_r (-0.04 -0.28 0.036)
    Marker RWJC: ulna_r (-0.0103425 -0.282273 0.0193938) fixed=true
    Marker RHNDR: hand_r (-0.024 -0.036 0.02) fixed=true
    Marker RHNDU: hand_r (-0.028 -0.035 -0.023) fixed=true
    Marker RCAR: hand_r (-0.022 -0.06 0) fixed=true
    Marker LASI: pelvis (0.00806532 0.0251673 -0.155708) fixed=true
    Marker RASI: pelvis (0.00667171 0.0262476 0.155498) fixed=true
    Marker LPSI: pelvis (-0.179961 0.0427387 -0.0601762) fixed=true
    Marker RPSI: pelvis (-0.178639 0.0408278 0.0607202) fixed=true
    Marker LHJC: femur_l (0 0 0) fixed=true
    Marker RHJC: femur_r (0 0 0) fixed=true
    Marker LTH1: femur_l (0.117468 -0.123623 -0.0284024)
    Marker LTH2: femur_l (0.108798 -0.292096 -0.024423)
    Marker LTH3: femur_l (0.0632861 -0.202397 -0.0859551)
    Marker LKJC: femur_l (-0.00430264 -0.442542 0.00115347) fixed=true
    Marker LMFC: femur_l (-0.0024482 -0.442179 0.0498195)
    Marker LLFC: femur_l (-0.00501388 -0.442142 -0.0496058) fixed=true
    Marker LTB1: origin_tibia_l (0.0481154 -0.123559 0.0138815)
    Marker LTB2: origin_tibia_l (0.0374103 -0.287621 0.0105662)
    Marker LTB3: origin_tibia_l (0.0421592 -0.204063 -0.0458924)
    Marker LAJC: origin_tibia_l (-0.00710878 -0.426501 -0.00691731) fixed=true
    Marker LMMAL: origin_tibia_l (0.0084 -0.42 0.038)
    Marker LLMAL: origin_tibia_l (-0.00799223 -0.43511 -0.050116) fixed=true
    Marker LCAL: calcn_l (-0.0102647 0.0408129 0.0016875)
    Marker LMT1: calcn_l (0.221903 0.0262658 0.0330549) fixed=true
    Marker LMT23: calcn_l (0.214103 0.02375 -0.0125288) fixed=true
    Marker LMT5: calcn_l (0.1812 0.0156307 -0.0447125) fixed=true
    Marker RTH1: femur_r (0.117366 -0.11999 0.036312)
    Marker RTH2: femur_r (0.120043 -0.282044 0.0238941)
    Marker RTH3: femur_r (0.0616657 -0.208743 0.0838862)
    Marker RTH4: femur_r (0.119312 -0.19999 0.0318663)
    Marker RKJC: femur_r (-0.00307281 -0.441644 -0.0028116) fixed=true
    Marker RMFC: femur_r (-9.39056e-5 -0.443293 -0.0525732)
    Marker RLFC: femur_r (-0.00153551 -0.436508 0.0478315) fixed=true
    Marker RTB1: origin_tibia_r (0.048507 -0.126732 -0.0141825)
    Marker RTB2: origin_tibia_r (0.0424273 -0.292323 -0.0111974)
    Marker RTB3: origin_tibia_r (0.0577646 -0.208792 0.0437985)
    Marker RAJC: origin_tibia_r (0.00270617 -0.428461 0.00383636) fixed=true
    Marker RMMAL: origin_tibia_r (0.00479018 -0.420253 -0.0370194) fixed=true
    Marker RLMAL: origin_tibia_r (-0.00772206 -0.439432 0.0496168) fixed=true
    Marker RCAL: calcn_r (-0.0116076 0.0411243 -0.00175573)
    Marker RMT1: calcn_r (0.224176 0.0232004 -0.0207589) fixed=true
    Marker RMT23: calcn_r (0.206369 0.0226289 0.0170363) fixed=true
    Marker RMT5: calcn_r (0.184581 0.0222947 0.0532195) fixed=true
